# OpenSim document version 40000
# Same marker set from Tim Dorn's 2012 sprint data. Changed marker locations to best match Rajagopal skeleton since Dorn's data were scaled. In the following: Ham for Hamner 2010, Raja for Rajagopal 2015, 2392 for gait2392 and Dorn for Dorn 2012. Positions for each R/L marker: SH: Ham acromium, C7: Ham C7 (similar to Raja but about 1.5 cm more forward), MAN: Ham clavicle (same as Raja but centered), T7: xy from Dorn, z set to 0 to center (Dorn's C7 Y ~ Raja/Ham C7 Y, thus scales similarly; justifies this approach), ASI: 2392 ASIS (differs from Raja by ~ 1 cm max), SACR: 2392 Sacral (same as Ham), LEPI/MEPI: 2392 Knee Lat/Med (same as Raja), LMAL/MMAL: Raja LMAL/MMAL, HEEL: Raja Cal, P1MT: 2392 Toe Med (similar to Raja TOE but Raja Y higher, 2392 better match Dorn P1MT Y), P5MT: yz of 2392 Toe Lat, x of Dorn (moves back 2 cm), TOE: 2392 Toe Tip (relative to toes), MFS/MFL: 2392 Midfoot Sup/Lat (similar to Ham but 2392 better match Dorn), ELB: Raja LEL, WR: Ham zy of Ham WJC, x of Dorn. Following markers were used for tracking; they were left the same as in Dorn but the y-values were scaled based on the relative y-coords of an antomical marker on the same segment in this model and Dorn's scaled marker positions: Forearm: scale factor = 0.8744 per RWR, Arm: scale factor = 0.9556 per RELB, TILAT/AD/AP: scale factor = 0.8090 (per RLMAL), THLP/LD/AD/AP: scale factor = 0.9057 (per RLEPI).
# Based on Dorn's supplementary figures: move MAN down 1 cm (s.t. y = 0.37), move lateral malleolus down ~1 cm (s.t. y = -40), bring TOE posterior 3.12 cm (s.t. x = 0.05)
# Markers are right/left symmetrical. Removed fp_ markers. Added virtual markers (see at bottom of file). Explanations are straightforward and given where may be unclear
MarkerSet dorn_sprinter:
  Marker RSH: torso (-0.03 0.42 0.15)
  Marker LSH: torso (-0.03 0.42 -0.15)
  Marker C7: torso (-0.07 0.44 0)
  Marker T7: torso (-0.10596 0.24405 0)
  Marker MAN: torso (0.04 0.37 0)
  Marker RASI: pelvis (0.02 0.03 0.128)
  Marker LASI: pelvis (0.02 0.03 -0.128)
  Marker SACR: pelvis (-0.16 0.04 0)
  Marker RTHAP: femur_r (0.11317 -0.1882 0.036642)
  Marker RTHAD: femur_r (0.10236 -0.2765 0.025423)
  Marker RTHLD: femur_r (0.010313 -0.2672 0.11094)
  Marker RTHLP: femur_r (0.0017237 -0.1651 0.12393)
  Marker RLEPI: femur_r (0 -0.404 0.05)
  Marker RMEPI: femur_r (0 -0.404 -0.05)
  Marker RTIAP: tibia_r (0.019959 -0.1897 -0.004359)
  Marker RTIAD: tibia_r (0.010577 -0.2915 -0.019176)
  Marker RTILAT: tibia_r (-0.019846 -0.2001 0.07975)
  Marker RLMAL: tibia_r (-0.005 -0.4 0.053)
  Marker RMMAL: tibia_r (0.006 -0.3888 -0.038)
  Marker RHEEL: calcn_r (-0.025 0.02 -0.005)
  Marker RMFS: calcn_r (0.13 0.03 -0.03)
  Marker RMFL: calcn_r (0.1 0.02 0.04)
  Marker RP1MT: calcn_r (0.19 0.005 -0.04)
  Marker RP5MT: calcn_r (0.17 0 0.065)
  Marker RTOE: toes_r (0.05 0.007 -0.00108)
  Marker LTHAP: femur_l (0.11317 -0.1882 -0.036642)
  Marker LTHAD: femur_l (0.10236 -0.2765 -0.025423)
  Marker LTHLD: femur_l (0.010313 -0.2672 -0.11094)
  Marker LTHLP: femur_l (0.0017237 -0.1651 -0.12393)
  Marker LLEPI: femur_l (0 -0.404 -0.05)
  Marker LMEPI: femur_l (0 -0.404 0.05)
  Marker LTIAP: tibia_l (0.019959 -0.1897 0.004359)
  Marker LTIAD: tibia_l (0.010577 -0.2915 0.019176)
  Marker LTILAT: tibia_l (-0.019846 -0.2001 -0.07975)
  Marker LLMAL: tibia_l (-0.005 -0.4 -0.053)
  Marker LMMAL: tibia_l (0.006 -0.3888 0.038)
  Marker LHEEL: calcn_l (-0.025 0.02 0.005)
  Marker LMFS: calcn_l (0.13 0.03 0.03)
  Marker LMFL: calcn_l (0.1 0.02 -0.04)
  Marker LP1MT: calcn_l (0.19 0.005 0.04)
  Marker LP5MT: calcn_l (0.17 0 -0.065)
  Marker LTOE: toes_l (0.05 0.007 0.00108)
  Marker RARM: humerus_r (-0.0061745 -0.1452 0.04168)
  Marker RELB: humerus_r (0.015 -0.28 0.04)
  Marker RFOREARM: radius_r (-0.040365 -0.1106 0.007551)
  Marker RWR: radius_r (-0.04 -0.23187 0.017)
  Marker LARM: humerus_l (-0.0061745 -0.1452 -0.04168)
  Marker LELB: humerus_l (0.015 -0.28 -0.04)
  Marker LFOREARM: radius_l (-0.040365 -0.1106 -0.007551)
  Marker LWR: radius_l (-0.04 -0.23187 -0.017)
  Marker mid_ASIS: pelvis (0.02 0.03 0)
  Marker mid_SH: torso (-0.03 0.42 0)
  Marker hara_RHJC: pelvis (-0.0263 -0.05 0.0863)
  Marker hara_LHJC: pelvis (-0.0263 -0.05 -0.0863)
  Marker hara_RHJC_pelvisX_projection: pelvis (-0.0263 0.03 0)
  Marker hara_RHJC_pelvisY_projection: pelvis (0.02 -0.05 0)
  Marker hara_RHJC_pelvisZ_projection: pelvis (0.02 0.03 0.0863)
  Marker RHJC: pelvis (-0.056276 -0.07849 0.07726)
  Marker LHJC: pelvis (-0.056276 -0.07849 -0.07726)
  Marker mid_HJC: pelvis (-0.056276 -0.07849 0)
  Marker RHJC_pelvisX_projection: pelvis (-0.056276 0.03 0)
  Marker RHJC_pelvisY_projection: pelvis (0.02 -0.07849 0)
  Marker RHJC_pelvisZ_projection: pelvis (0.02 0.03 0.07726)
  Marker RKJC: tibia_r (-0.00808954 -0.0035348 -0.00148474)
  Marker LKJC: tibia_l (-0.00808954 -0.0035348 0.00148474)
  Marker mid_REPI: tibia_r (0 0 0)
  Marker mid_REPI_femurX_projection: femur_r (0.00357816 0 0)
  Marker mid_REPI_femurY_projection: femur_r (0 -0.406092 0)
  Marker mid_REPI_femurZ_projection: femur_r (0 0 -0.000262593)
  Marker mid_LEPI: tibia_l (0 0 0)
  Marker mid_LEPI_femurX_projection: femur_l (0.00357816 0 0)
  Marker mid_LEPI_femurY_projection: femur_l (0 -0.406092 0)
  Marker mid_LEPI_femurZ_projection: femur_l (0 0 0.000262593)
  Marker mid_RMAL: tibia_r (0.0005 -0.3944 0.0075)
  Marker mid_LMAL: tibia_l (0.0005 -0.3944 -0.0075)
  Marker RAJC: talus_r (0 0 0)
  Marker LAJC: talus_l (0 0 0)
