# OpenSim document version 40000
Model HOBLingApoorva-scaled:
  gravity: 0 -9.80665 0
  length_units: meters
  force_units: N
  credits:
    Arnold, E.M., Hamner, S.R., Ward, S.R., Lieber, R. L., and Delp, S.L.
  Ground
  BodySet:
    Body pelvis: mass=8.941747 [kg] mass_center=(-0.08012526 0 0) inertia=(0.07201337 0.07201337 0.04518339 0 0 0)
        meshes=(r_pelvis.vtp l_pelvis.vtp sacrum.vtp)
      WrapCylinder Gmax1_at_pelvis_r: xyz_body_rotation=(-0.6 0.45 0) translation=(-0.08726513 -0.08978375 0.05726898)
          quadrant=-x radius=0.04029501 length=0.1456176
      WrapCylinder Gmax2_at_pelvis_r: xyz_body_rotation=(-0.75 0.39 0) translation=(-0.09066507 -0.07527324 0.06384083)
          quadrant=all radius=0.04054815 length=0.09572028
      WrapCylinder Gmax3_at_pelvis_r: xyz_body_rotation=(-0.1 0 0) translation=(-0.09406501 -0.07980777 0.06384083)
          quadrant=all radius=0.04081087 length=0.09385229
      WrapCylinder Gmax1_at_pelvis_l: xyz_body_rotation=(0.6 -0.45 0) translation=(-0.08726513 -0.08978375 -0.05726898)
          quadrant=-x radius=0.04029501 length=0.1456176
      WrapCylinder Gmax2_at_pelvis_l: xyz_body_rotation=(0.75 -0.39 0)
          translation=(-0.09066507 -0.07527324 -0.06384083) quadrant=all radius=0.04054815 length=0.09572028
      WrapCylinder Gmax3_at_pelvis_l: xyz_body_rotation=(0.1 0 0) translation=(-0.09406501 -0.07980777 -0.06384083)
          quadrant=all radius=0.04081087 length=0.09385229
      WrapCylinder PS_at_brim_r: xyz_body_rotation=(-0.25 -0.27 0.1) translation=(-0.08386519 -0.05441439 0.06158762)
          quadrant=-y radius=0.05074719 length=0.09522251
      WrapCylinder PS_at_brim_l: xyz_body_rotation=(0.25 0.27 0.1) translation=(-0.08386519 -0.05441439 -0.06158762)
          quadrant=-y radius=0.05074719 length=0.09522251
      WrapCylinder IL_at_brim_r: xyz_body_rotation=(-0.32 -0.24 0.9) translation=(-0.08046525 -0.05894892 0.07097598)
          quadrant=-y radius=0.05609819 length=0.09479875
      WrapCylinder IL_at_brim_l: xyz_body_rotation=(0.32 0.24 0.9) translation=(-0.08046525 -0.05894892 -0.07097598)
          quadrant=-y radius=0.05609819 length=0.09479875
    Body femur_r: mass=7.062135 mass_center=(0 -0.1595908 0) inertia=(0.09508149 0.03445823 0.09508149 0 0 0)
        meshes=r_femur.vtp
      WrapCylinder Gastroc_at_condyles_r: translation=(0.005685505 -0.3848954 0) quadrant=all radius=0.02594838
          length=0.1137101
      WrapCylinder KnExt_at_fem_r: xyz_body_rotation=(-0.0623366 0.0507601 0)
          translation=(0.004080237 -0.3780725 0.002377803) quadrant=all radius=0.02595899 length=0.11364
      WrapCylinder AB_at_femshaft_r: xyz_body_rotation=(1.66157 0.186644 0)
          translation=(0.01665103 -0.1057007 0.02656837) quadrant=all radius=0.01869874 length=0.066361
      WrapCylinder AL_at_femshaft_r: xyz_body_rotation=(1.77711 0.136489 0)
          translation=(0.03494619 -0.2177091 0.0171858) quadrant=all radius=0.02274681 length=0.09517708
      WrapCylinder AMprox_at_femshaft_r: xyz_body_rotation=(1.61126 0.18656 0)
          translation=(0.005893583 -0.0684314 0.02888578) quadrant=all radius=0.02392393 length=0.06626388
      WrapCylinder AMmid_at_femshaft_r: xyz_body_rotation=(1.61139 0.13656 0)
          translation=(0.02616754 -0.1508706 0.02340632) quadrant=all radius=0.02429488 length=0.1131813
      WrapCylinder AMdist_at_femshaft_r: xyz_body_rotation=(1.71188 0.186636 0)
          translation=(0.03593978 -0.244771 0.0106485) quadrant=all radius=0.02468295 length=0.1900867
      WrapCylinder AMisch_at_condyles_r: xyz_body_rotation=(1.71115 -0.463363 0)
          translation=(-0.02575659 -0.3537574 -0.003586838) quadrant=all radius=0.0446925 length=0.2363706
      WrapCylinder PECT_at_femshaft_r: xyz_body_rotation=(1.81295 0.276344 0)
          translation=(0.00692009 -0.07932873 0.03461393) quadrant=all radius=0.01688228 length=0.0483179
    Body tibia_r: mass=2.814938 mass_center=(0 -0.1716124 0) inertia=(0.03219218 0.002992886 0.03219218 0 0 0)
        meshes=(r_tibia.vtp r_fibula.vtp)
      WrapCylinder GasLat_at_shank_r: xyz_body_rotation=(2.96723 -0.279725 -1.47812)
          translation=(-0.006505757 -0.06801989 -0.002901216) quadrant=-y radius=0.04942541 length=0.08802939
      WrapCylinder GasMed_at_shank_r: xyz_body_rotation=(2.96723 0.0279725 -1.47812)
          translation=(-0.006505757 -0.06801989 -0.002901216) quadrant=-y radius=0.04942241 length=0.08803868
      WrapCylinder GR_at_condyles_r: xyz_body_rotation=(0 -0.4 0) translation=(-0.002637469 -0.01838376 0) quadrant=all
          radius=0.0323702 length=0.08791564
      WrapCylinder SM_at_condyles_r: xyz_body_rotation=(0 -0.1 0) translation=(-0.0008791564 -0.01838376 0)
          quadrant=all radius=0.03165086 length=0.08791564
      WrapCylinder ST_at_condyles_r: xyz_body_rotation=(0 -0.2 0) translation=(-0.001758313 -0.01884335 0) quadrant=all
          radius=0.03821481 length=0.08791564
      WrapCylinder BF_at_gastroc_r: translation=(-0.05099107 -0.05515127 0) quadrant=y radius=0.02697516
          length=0.1318735
    Body patella_r: mass=0.06544779 mass_center=(0.002046782 0.03001947 0)
        inertia=(2.817525e-6 1.28703e-5 1.28703e-5 0 0 0) meshes=r_patella.vtp
    Body talus_r: mass=0.07592551 mass_center=(0 0 0) inertia=(0.000667504 0.0006166732 0.0006166732 0 0 0)
        meshes=r_talus.vtp
    Body calcn_r: mass=0.9490689 mass_center=(0.08632844 0.03 0) inertia=(0.0009345056 0.002277948 0.002277948 0 0 0)
        meshes=r_foot.vtp
    Body toes_r: mass=0.1644547 mass_center=(0.02986964 0.006 -0.01538524)
        inertia=(6.67504e-5 0.0001182516 0.0001182516 0 0 0) meshes=r_bofoot.vtp
    Body femur_l: mass=7.062135 mass_center=(0 -0.1593653 0) inertia=(0.094008 0.032751 0.094008 0 0 0)
        meshes=l_femur.vtp
      WrapCylinder Gastroc_at_condyles_l: translation=(0.005542872 -0.3843515 0) quadrant=all radius=0.02557521
          length=0.1108574
      WrapCylinder KnExt_at_fem_l: xyz_body_rotation=(0.0623366 -0.0507601 0)
          translation=(0.003977875 -0.3775382 -0.002318151) quadrant=all radius=0.02558425 length=0.1107963
      WrapCylinder AB_at_femshaft_l: xyz_body_rotation=(-1.66157 -0.186644 0)
          translation=(0.0162333 -0.1055514 -0.02590184) quadrant=all radius=0.01823616 length=0.06617253
      WrapCylinder AL_at_femshaft_l: xyz_body_rotation=(-1.77711 -0.136489 0)
          translation=(0.03406948 -0.2174014 -0.01675466) quadrant=all radius=0.02218736 length=0.09485266
      WrapCylinder AMprox_at_femshaft_l: xyz_body_rotation=(-1.61126 -0.18656 0)
          translation=(0.00574573 -0.0683347 -0.02816112) quadrant=all radius=0.02333083 length=0.06608971
      WrapCylinder AMmid_at_femshaft_l: xyz_body_rotation=(-1.61139 -0.13656 0)
          translation=(0.02551107 -0.1506574 -0.02281912) quadrant=all radius=0.0236894 length=0.1129438
      WrapCylinder AMdist_at_femshaft_l: xyz_body_rotation=(-1.71188 -0.186636 0)
          translation=(0.03503816 -0.2444251 -0.01038136) quadrant=all radius=0.0240746 length=0.1894771
      WrapCylinder AMisch_at_condyles_l: xyz_body_rotation=(-1.71115 0.463363 0)
          translation=(-0.02511043 -0.3532575 0.003496854) quadrant=all radius=0.04365357 length=0.2344433
      WrapCylinder PECT_at_femshaft_l: xyz_body_rotation=(-1.81295 -0.276344 0)
          translation=(0.006746484 -0.07921663 -0.03374556) quadrant=all radius=0.01647671 length=0.04804941
    Body tibia_l: mass=2.814938 mass_center=(0 -0.16775 0) inertia=(0.03088072 0.003102226 0.03088072 0 0 0)
        meshes=(l_tibia.vtp l_fibula.vtp)
      WrapCylinder GasLat_at_shank_l: xyz_body_rotation=(-2.96723 0.279725 -1.47812)
          translation=(-0.00662353 -0.06648903 0.002953736) quadrant=-y radius=0.04932062 length=0.08951671
      WrapCylinder GasMed_at_shank_l: xyz_body_rotation=(-2.96723 -0.0279725 -1.47812)
          translation=(-0.00662353 -0.06648903 0.002953736) quadrant=-y radius=0.0493204 length=0.08951749
      WrapCylinder GR_at_condyles_l: xyz_body_rotation=(0 0.4 0) translation=(-0.002685215 -0.01797001 0) quadrant=all
          radius=0.0322843 length=0.08950716
      WrapCylinder SM_at_condyles_l: xyz_body_rotation=(0 0.1 0) translation=(-0.0008950716 -0.01797001 0) quadrant=all
          radius=0.03156687 length=0.08950716
      WrapCylinder ST_at_condyles_l: xyz_body_rotation=(0 0.2 0) translation=(-0.001790143 -0.01841926 0) quadrant=all
          radius=0.0381134 length=0.08950716
      WrapCylinder BF_at_gastroc_l: translation=(-0.05191415 -0.05391002 0) quadrant=all radius=0.02690358
          length=0.1342607
    Body patella_l: mass=0.06544779 mass_center=(0.001995434 0.02926636 0)
        inertia=(2.67793e-6 1.223264e-5 1.223264e-5 0 0 0) meshes=l_patella.vtp
    Body talus_l: mass=0.07592551 mass_center=(0 0 0) inertia=(0.0006795877 0.0005997415 0.0005997415 0 0 0)
        meshes=l_talus.vtp
    Body calcn_l: mass=0.9490689 mass_center=(0.08274925 0.03 0) inertia=(0.0009514227 0.002139376 0.002139376 0 0 0)
        meshes=l_foot.vtp
    Body toes_l: mass=0.1644547 mass_center=(0.02863124 0.006 0.01566375)
        inertia=(6.795877e-5 0.0001119637 0.0001119637 0 0 0) meshes=l_bofoot.vtp
    Body torso: mass=20.36823 mass_center=(-0.03389156 0.2806409 0) inertia=(1.000515 0.7200943 1.000515 0 0 0)
        meshes=(hat_spine.vtp hat_jaw.vtp hat_skull.vtp hat_ribs_scap.vtp)
    Body humerus_r: mass=1.543186 mass_center=(0 -0.1690512 0) inertia=(0.009578648 0.003304337 0.01075172 0 0 0)
        meshes=humerus_rv.vtp
    Body ulna_r: mass=0.4612475 mass_center=(0 -0.1122033 0) inertia=(0.001949082 0.0004066618 0.002114247 0 0 0)
        meshes=ulna_rv.vtp
    Body radius_r: mass=0.4612475 mass_center=(0 -0.1122033 0) inertia=(0.001949082 0.0004066618 0.002114247 0 0 0)
        meshes=radius_rv.vtp
    Body hand_r: mass=0.3473592 mass_center=(0 -0.068095 0) inertia=(0.0006772555 0.0004153125 0.001017402 0 0 0)
        meshes=(pisiform_rvs.vtp lunate_rvs.vtp scaphoid_rvs.vtp triquetrum_rvs.vtp hamate_rvs.vtp capitate_rvs.vtp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)
    Body humerus_l: mass=1.543186 mass_center=(0 -0.1713726 0) inertia=(0.00984352 0.003395709 0.01104903 0 0 0)
        meshes=humerus_lv.vtp
    Body ulna_l: mass=0.4612475 mass_center=(0 -0.1137711 0) inertia=(0.00200393 0.0004181056 0.002173743 0 0 0)
        meshes=ulna_lv.vtp
    Body radius_l: mass=0.4612475 mass_center=(0 -0.1137711 0) inertia=(0.00200393 0.0004181056 0.002173743 0 0 0)
        meshes=radius_lv.vtp
    Body hand_l: mass=0.3473592 mass_center=(0 -0.068095 0) inertia=(0.0006772555 0.0004153125 0.001017402 0 0 0)
        meshes=(pisiform_lvs.vtp lunate_lvs.vtp scaphoid_lvs.vtp triquetrum_lvs.vtp hamate_lvs.vtp capitate_lvs.vtp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)
  JointSet:
    CustomJoint ground_pelvis: socket_parent_frame=ground_offset socket_child_frame=pelvis_offset
      Coordinate pelvis_tilt: default_value=0 range=(-1.570796 1.570796) clamped=true
      Coordinate pelvis_list: default_value=0 range=(-1.570796 1.570796) clamped=true
      Coordinate pelvis_rotation: default_value=0 range=(-1.570796 1.570796) clamped=true
      Coordinate pelvis_tx: default_value=0 range=(-5 5) clamped=true
      Coordinate pelvis_ty: default_value=0.93 range=(-1 2) clamped=true
      Coordinate pelvis_tz: default_value=0 range=(-3 3) clamped=true
      PhysicalOffsetFrame ground_offset: socket_parent=/ground translation=(0 0 0) [meters]
      PhysicalOffsetFrame pelvis_offset: socket_parent=/bodyset/pelvis translation=(0 0 0)
      SpatialTransform:
        TransformAxis rotation1: coordinates=pelvis_tilt axis=(0 0 1) LinearFunction(coefficients=1 0)
        TransformAxis rotation2: coordinates=pelvis_list axis=(1 0 0) LinearFunction(coefficients=1 0)
        TransformAxis rotation3: coordinates=pelvis_rotation axis=(0 1 0) LinearFunction(coefficients=1 0)
        TransformAxis translation1: coordinates=pelvis_tx axis=(1 0 0) LinearFunction(coefficients=1 0)
        TransformAxis translation2: coordinates=pelvis_ty axis=(0 1 0) LinearFunction(coefficients=1 0)
        TransformAxis translation3: coordinates=pelvis_tz axis=(0 0 1) LinearFunction(coefficients=1 0)
    CustomJoint hip_r: socket_parent_frame=pelvis_offset socket_child_frame=femur_r_offset
      Coordinate hip_flexion_r: default_value=0 range=(-0.5235988 2.094395) clamped=true
      Coordinate hip_adduction_r: default_value=0 range=(-0.8726646 0.5235988) clamped=true
      Coordinate hip_rotation_r: default_value=0 range=(-0.6981317 0.6981317) clamped=true
      PhysicalOffsetFrame pelvis_offset: socket_parent=/bodyset/pelvis translation=(-0.06377835 -0.07118309 0.07253445)
      PhysicalOffsetFrame femur_r_offset: socket_parent=/bodyset/femur_r translation=(0 0 0)
      SpatialTransform: axes_held_at_zero=(translation1 translation2 translation3)
        TransformAxis rotation1: coordinates=hip_flexion_r axis=(0 0 1) LinearFunction(coefficients=1 0)
        TransformAxis rotation2: coordinates=hip_adduction_r axis=(1 0 0) LinearFunction(coefficients=1 0)
        TransformAxis rotation3: coordinates=hip_rotation_r axis=(0 1 0) LinearFunction(coefficients=1 0)
    CustomJoint walker_knee_r: socket_parent_frame=femur_r_offset socket_child_frame=tibia_r_offset
      Coordinate knee_angle_r: default_value=0 range=(0 2.0944) clamped=true
      PhysicalOffsetFrame femur_r_offset: socket_parent=/bodyset/femur_r
          translation=(-0.009199148 -0.3829803 -0.003127028) orientation=(-1.64157 1.44618 1.5708) [radians]
      PhysicalOffsetFrame tibia_r_offset: socket_parent=/bodyset/tibia_r
          translation=(-0.007111971 -0.003249145 -0.001305319) orientation=(-1.64157 1.44618 1.5708)
      SpatialTransform: axes_held_at_zero=translation3
        TransformAxis rotation1: coordinates=knee_angle_r axis=(1 0 0) LinearFunction(coefficients=1 0)
        TransformAxis rotation2: coordinates=knee_angle_r axis=(0 0 1)
          SimmSpline: x=(0 0.174533 0.349066 0.523599 0.698132 0.872665 1.0472 1.22173 1.39626 1.5708 1.74533 1.91986 2.0944)
              y=(0 0.0126809 0.0226969 0.0296054 0.0332049 0.0335354 0.0308779 0.0257548 0.0189295 0.011407 0.00443314 -0.00050475 -0.0016782)
        TransformAxis rotation3: coordinates=knee_angle_r axis=(0 1 0)
          SimmSpline: x=(0 0.174533 0.349066 0.523599 0.698132 0.872665 1.0472 1.22173 1.39626 1.5708 1.74533 1.91986 2.0944)
              y=(0 0.059461 0.109399 0.150618 0.18392 0.210107 0.229983 0.24435 0.254012 0.25977 0.262428 0.262788 0.261654)
        TransformAxis translation1: coordinates=knee_angle_r axis=(0 1 0)
          MultiplierFunction: scale=0.9387693
            SimmSpline: x=(0 0.174533 0.349066 0.523599 0.698132 0.872665 1.0472 1.22173 1.39626 1.5708 1.74533 1.91986 2.0944)
                y=(0 0.000479 0.000835 0.001086 0.001251 0.001346 0.001391 0.001403 0.0014 0.0014 0.001421 0.001481 0.001599)
        TransformAxis translation2: coordinates=knee_angle_r axis=(0 0 1)
          MultiplierFunction: scale=1.137101
            SimmSpline: x=(0 0.174533 0.349066 0.523599 0.698132 0.872665 1.0472 1.22173 1.39626 1.5708 1.74533 1.91986 2.0944)
                y=(0 0.000988 0.001899 0.002734 0.003492 0.004173 0.004777 0.005305 0.005756 0.00613 0.006427 0.006648 0.006792)
    CustomJoint patellofemoral_r: socket_parent_frame=femur_r_offset socket_child_frame=patella_r_offset
      Coordinate knee_angle_r_beta: default_value=0 range=(-99999.9 99999.9) clamped=false
      PhysicalOffsetFrame femur_r_offset: socket_parent=/bodyset/femur_r
          translation=(-0.009199148 -0.3829803 -0.003127028)
      PhysicalOffsetFrame patella_r_offset: socket_parent=/bodyset/patella_r translation=(0 0 0)
      SpatialTransform: axes_held_at_zero=(rotation2 rotation3)
        TransformAxis rotation1: coordinates=knee_angle_r_beta axis=(0 0 1)
          SimmSpline: x=(0 0.174533 0.349066 0.523599 0.698132 0.872665 1.0472 1.22173 1.39626 1.5708 1.74533 1.91986 2.0944)
              y=(0.00113686 -0.00629212 -0.105582 -0.253683 -0.414245 -0.579047 -0.747244 -0.91799 -1.09044 -1.26379 -1.43763 -1.61186 -1.78634)
        TransformAxis translation1: coordinates=knee_angle_r_beta axis=(1 0 0)
          MultiplierFunction: scale=1.137101
            SimmSpline: x=(0 0.174533 0.349066 0.523599 0.698132 0.872665 1.0472 1.22173 1.39626 1.5708 1.74533 1.91986 2.0944)
                y=(0.0524 0.0488 0.0437 0.0371 0.0296 0.0216 0.0136 0.0057 -0.0019 -0.0088 -0.0148 -0.0196 -0.0227)
        TransformAxis translation2: coordinates=knee_angle_r_beta axis=(0 1 0)
          MultiplierFunction: scale=0.9387693
            SimmSpline: x=(0 0.174533 0.349066 0.523599 0.698132 0.872665 1.0472 1.22173 1.39626 1.5708 1.74533 1.91986 2.0944)
                y=(-0.0108 -0.019 -0.0263 -0.0322 -0.0367 -0.0395 -0.0408 -0.0404 -0.0384 -0.0349 -0.0301 -0.0245 -0.0187)
        TransformAxis translation3: axis=(0 0 1) MultiplierFunction(scale=1.137101, Constant(value=0.00275))
    PinJoint ankle_r: socket_parent_frame=tibia_r_offset socket_child_frame=talus_r_offset
      Coordinate ankle_angle_r: default_value=0 range=(-0.6981317 0.5235988) clamped=true
      PhysicalOffsetFrame tibia_r_offset: socket_parent=/bodyset/tibia_r translation=(-0.008791564 -0.3676751 0)
          orientation=(0.175895 -0.105208 0.0186622)
      PhysicalOffsetFrame talus_r_offset: socket_parent=/bodyset/talus_r translation=(0 0 0)
          orientation=(0.175895 -0.105208 0.0186622)
    PinJoint subtalar_r: socket_parent_frame=talus_r_offset socket_child_frame=calcn_r_offset
      Coordinate subtalar_angle_r: default_value=0 range=(-0.3490659 0.3490659) clamped=true
      PhysicalOffsetFrame talus_r_offset: socket_parent=/bodyset/talus_r translation=(-0.04210238 -0.04195 0.006962919)
          orientation=(-1.76819 0.906223 1.8196)
      PhysicalOffsetFrame calcn_r_offset: socket_parent=/bodyset/calcn_r translation=(0 0 0)
          orientation=(-1.76819 0.906223 1.8196)
    PinJoint mtp_r: socket_parent_frame=calcn_r_offset socket_child_frame=toes_r_offset
      Coordinate mtp_angle_r: default_value=0 range=(-0.5235988 0.5235988) clamped=true locked=true
      PhysicalOffsetFrame calcn_r_offset: socket_parent=/bodyset/calcn_r translation=(0.1543552 -0.002 0.0009494889)
          orientation=(-3.14159 0.619901 0)
      PhysicalOffsetFrame toes_r_offset: socket_parent=/bodyset/toes_r translation=(0 0 0)
          orientation=(-3.14159 0.619901 0)
    CustomJoint hip_l: socket_parent_frame=pelvis_offset socket_child_frame=femur_l_offset
      Coordinate hip_flexion_l: default_value=0 range=(-0.5235988 2.094395) clamped=true
      Coordinate hip_adduction_l: default_value=0 range=(-0.8726646 0.5235988) clamped=true
      Coordinate hip_rotation_l: default_value=0 range=(-0.6981317 0.6981317) clamped=true
      PhysicalOffsetFrame pelvis_offset: socket_parent=/bodyset/pelvis
          translation=(-0.06377835 -0.07118309 -0.07253445)
      PhysicalOffsetFrame femur_l_offset: socket_parent=/bodyset/femur_l translation=(0 0 0)
      SpatialTransform: axes_held_at_zero=(translation1 translation2 translation3)
        TransformAxis rotation1: coordinates=hip_flexion_l axis=(0 0 1) LinearFunction(coefficients=1 0)
        TransformAxis rotation2: coordinates=hip_adduction_l axis=(1 0 0) LinearFunction(coefficients=-1 0)
        TransformAxis rotation3: coordinates=hip_rotation_l axis=(0 1 0) LinearFunction(coefficients=-1 0)
    CustomJoint walker_knee_l: socket_parent_frame=femur_l_offset socket_child_frame=tibia_l_offset
      Coordinate knee_angle_l: default_value=0 range=(0 2.0944) clamped=true
      PhysicalOffsetFrame femur_l_offset: socket_parent=/bodyset/femur_l
          translation=(-0.008968367 -0.3824391 0.00304858) orientation=(1.64157 -1.44618 1.5708)
      PhysicalOffsetFrame tibia_l_offset: socket_parent=/bodyset/tibia_l
          translation=(-0.007240717 -0.003176019 0.001328949) orientation=(1.64157 -1.44618 1.5708)
      SpatialTransform: axes_held_at_zero=translation3
        TransformAxis rotation1: coordinates=knee_angle_l axis=(-1 0 0) LinearFunction(coefficients=1 0)
        TransformAxis rotation2: coordinates=knee_angle_l axis=(0 0 1)
          SimmSpline: x=(0 0.174533 0.349066 0.523599 0.698132 0.872665 1.0472 1.22173 1.39626 1.5708 1.74533 1.91986 2.0944)
              y=(0 0.0126809 0.0226969 0.0296054 0.0332049 0.0335354 0.0308779 0.0257548 0.0189295 0.011407 0.00443314 -0.00050475 -0.0016782)
        TransformAxis rotation3: coordinates=knee_angle_l axis=(0 1 0)
          SimmSpline: x=(0 0.174533 0.349066 0.523599 0.698132 0.872665 1.0472 1.22173 1.39626 1.5708 1.74533 1.91986 2.0944)
              y=(0 -0.059461 -0.109399 -0.150618 -0.18392 -0.210107 -0.229983 -0.24435 -0.254012 -0.25977 -0.262428 -0.262788 -0.261654)
        TransformAxis translation1: coordinates=knee_angle_l axis=(0 1 0)
          MultiplierFunction: scale=0.9374427
            SimmSpline: x=(0 0.174533 0.349066 0.523599 0.698132 0.872665 1.0472 1.22173 1.39626 1.5708 1.74533 1.91986 2.0944)
                y=(0 0.000479 0.000835 0.001086 0.001251 0.001346 0.001391 0.001403 0.0014 0.0014 0.001421 0.001481 0.001599)
        TransformAxis translation2: coordinates=knee_angle_l axis=(0 0 1)
          MultiplierFunction: scale=1.108574
            SimmSpline: x=(0 0.174533 0.349066 0.523599 0.698132 0.872665 1.0472 1.22173 1.39626 1.5708 1.74533 1.91986 2.0944)
                y=(0 -0.000988 -0.001899 -0.002734 -0.003492 -0.004173 -0.004777 -0.005305 -0.005756 -0.00613 -0.006427 -0.006648 -0.006792)
    CustomJoint patellofemoral_l: socket_parent_frame=femur_l_offset socket_child_frame=patella_l_offset
      Coordinate knee_angle_l_beta: default_value=0 range=(-99999.9 99999.9) clamped=false
      PhysicalOffsetFrame femur_l_offset: socket_parent=/bodyset/femur_l
          translation=(-0.008968367 -0.3824391 0.00304858)
      PhysicalOffsetFrame patella_l_offset: socket_parent=/bodyset/patella_l translation=(0 0 0)
      SpatialTransform: axes_held_at_zero=(rotation2 rotation3)
        TransformAxis rotation1: coordinates=knee_angle_l_beta axis=(0 0 1)
          SimmSpline: x=(0 0.174533 0.349066 0.523599 0.698132 0.872665 1.0472 1.22173 1.39626 1.5708 1.74533 1.91986 2.0944)
              y=(0.00113686 -0.00629212 -0.105582 -0.253683 -0.414245 -0.579047 -0.747244 -0.91799 -1.09044 -1.26379 -1.43763 -1.61186 -1.78634)
        TransformAxis translation1: coordinates=knee_angle_l_beta axis=(1 0 0)
          MultiplierFunction: scale=1.108574
            SimmSpline: x=(0 0.174533 0.349066 0.523599 0.698132 0.872665 1.0472 1.22173 1.39626 1.5708 1.74533 1.91986 2.0944)
                y=(0.0524 0.0488 0.0437 0.0371 0.0296 0.0216 0.0136 0.0057 -0.0019 -0.0088 -0.0148 -0.0196 -0.0227)
        TransformAxis translation2: coordinates=knee_angle_l_beta axis=(0 1 0)
          MultiplierFunction: scale=0.9374427
            SimmSpline: x=(0 0.174533 0.349066 0.523599 0.698132 0.872665 1.0472 1.22173 1.39626 1.5708 1.74533 1.91986 2.0944)
                y=(-0.0108 -0.019 -0.0263 -0.0322 -0.0367 -0.0395 -0.0408 -0.0404 -0.0384 -0.0349 -0.0301 -0.0245 -0.0187)
        TransformAxis translation3: axis=(0 0 1) MultiplierFunction(scale=1.108574, Constant(value=-0.00275))
    PinJoint ankle_l: socket_parent_frame=tibia_l_offset socket_child_frame=talus_l_offset
      Coordinate ankle_angle_l: default_value=0 range=(-0.6981317 0.5235988) clamped=true
      PhysicalOffsetFrame tibia_l_offset: socket_parent=/bodyset/tibia_l translation=(-0.008950716 -0.3594002 0)
          orientation=(-0.175895 0.105208 0.0186622)
      PhysicalOffsetFrame talus_l_offset: socket_parent=/bodyset/talus_l translation=(0 0 0)
          orientation=(-0.175895 0.105208 0.0186622)
    PinJoint subtalar_l: socket_parent_frame=talus_l_offset socket_child_frame=calcn_l_offset
      Coordinate subtalar_angle_l: default_value=0 range=(-0.3490659 0.3490659) clamped=true
      PhysicalOffsetFrame talus_l_offset: socket_parent=/bodyset/talus_l
          translation=(-0.04035681 -0.04195 -0.007088967) orientation=(1.76819 -0.906223 1.8196)
      PhysicalOffsetFrame calcn_l_offset: socket_parent=/bodyset/calcn_l translation=(0 0 0)
          orientation=(1.76819 -0.906223 1.8196)
    PinJoint mtp_l: socket_parent_frame=calcn_l_offset socket_child_frame=toes_l_offset
      Coordinate mtp_angle_l: default_value=0 range=(-0.5235988 0.5235988) clamped=true locked=true
      PhysicalOffsetFrame calcn_l_offset: socket_parent=/bodyset/calcn_l translation=(0.1479557 -0.002 -0.0009666773)
          orientation=(-3.14159 -0.619901 0)
      PhysicalOffsetFrame toes_l_offset: socket_parent=/bodyset/toes_l translation=(0 0 0)
          orientation=(-3.14159 -0.619901 0)
    CustomJoint back: socket_parent_frame=pelvis_offset socket_child_frame=torso_offset
      Coordinate lumbar_extension: default_value=0 range=(-1.570796 1.570796) clamped=true
      Coordinate lumbar_bending: default_value=0 range=(-1.570796 1.570796) clamped=true
      Coordinate lumbar_rotation: default_value=0 range=(-1.570796 1.570796) clamped=true
      PhysicalOffsetFrame pelvis_offset: socket_parent=/bodyset/pelvis translation=(-0.1141247 0.07391288 0)
      PhysicalOffsetFrame torso_offset: socket_parent=/bodyset/torso translation=(0 0 0)
      SpatialTransform: axes_held_at_zero=(translation1 translation2 translation3)
        TransformAxis rotation1: coordinates=lumbar_extension axis=(0 0 1) LinearFunction(coefficients=1 0)
        TransformAxis rotation2: coordinates=lumbar_bending axis=(1 0 0) LinearFunction(coefficients=1 0)
        TransformAxis rotation3: coordinates=lumbar_rotation axis=(0 1 0) LinearFunction(coefficients=1 0)
    CustomJoint acromial_r: socket_parent_frame=torso_offset socket_child_frame=humerus_r_offset
      Coordinate arm_flex_r: default_value=0 range=(-1.570796 1.570796) clamped=true
      Coordinate arm_add_r: default_value=0 range=(-2.094395 1.570796) clamped=true
      Coordinate arm_rot_r: default_value=0 range=(-1.570796 1.570796) clamped=true
      PhysicalOffsetFrame torso_offset: socket_parent=/bodyset/torso translation=(0.003564262 0.3258065 0.188906)
      PhysicalOffsetFrame humerus_r_offset: socket_parent=/bodyset/humerus_r translation=(0 0 0)
      SpatialTransform: axes_held_at_zero=(translation1 translation2 translation3)
        TransformAxis rotation1: coordinates=arm_flex_r axis=(0 0 1) LinearFunction(coefficients=1 0)
        TransformAxis rotation2: coordinates=arm_add_r axis=(1 0 0) LinearFunction(coefficients=1 0)
        TransformAxis rotation3: coordinates=arm_rot_r axis=(0 1 0) LinearFunction(coefficients=1 0)
    PinJoint elbow_r: socket_parent_frame=humerus_r_offset socket_child_frame=ulna_r_offset
      Coordinate elbow_flex_r: default_value=0 range=(0 2.618) clamped=true
      PhysicalOffsetFrame humerus_r_offset: socket_parent=/bodyset/humerus_r
          translation=(0.01350749 -0.2941897 -0.009860342) orientation=(-0.0228627 0.228018 0.0051689)
      PhysicalOffsetFrame ulna_r_offset: socket_parent=/bodyset/ulna_r translation=(0 0 0)
          orientation=(-0.0228627 0.228018 0.0051689)
    PinJoint radioulnar_r: socket_parent_frame=ulna_r_offset socket_child_frame=radius_r_offset
      Coordinate pro_sup_r: default_value=0 range=(0 1.570796) clamped=true
      PhysicalOffsetFrame ulna_r_offset: socket_parent=/bodyset/ulna_r translation=(-0.006262533 -0.01210893 0.0242821)
          orientation=(-1.56884 0.056428 1.53614)
      PhysicalOffsetFrame radius_r_offset: socket_parent=/bodyset/radius_r translation=(0 0 0)
          orientation=(-1.56884 0.056428 1.53614)
    UniversalJoint radius_hand_r: socket_parent_frame=radius_r_offset socket_child_frame=hand_r_offset
      Coordinate wrist_flex_r: default_value=0 range=(-1.22173 1.22173) clamped=true locked=true
      Coordinate wrist_dev_r: default_value=0 range=(-0.4363323 0.6108652) clamped=true locked=true
      PhysicalOffsetFrame radius_r_offset: socket_parent=/bodyset/radius_r
          translation=(-0.00818961 -0.2195573 0.0126703) orientation=(-1.5708 0 -1.5708)
      PhysicalOffsetFrame hand_r_offset: socket_parent=/bodyset/hand_r translation=(0 0 0)
          orientation=(-1.5708 0 -1.5708)
    CustomJoint acromial_l: socket_parent_frame=torso_offset socket_child_frame=humerus_l_offset
      Coordinate arm_flex_l: default_value=0 range=(-1.570796 1.570796) clamped=true
      Coordinate arm_add_l: default_value=0 range=(-2.094395 1.570796) clamped=true
      Coordinate arm_rot_l: default_value=0 range=(-1.570796 1.570796) clamped=true
      PhysicalOffsetFrame torso_offset: socket_parent=/bodyset/torso translation=(0.003564262 0.3258065 -0.188906)
      PhysicalOffsetFrame humerus_l_offset: socket_parent=/bodyset/humerus_l translation=(0 0 0)
      SpatialTransform: axes_held_at_zero=(translation1 translation2 translation3)
        TransformAxis rotation1: coordinates=arm_flex_l axis=(0 0 1) LinearFunction(coefficients=1 0)
        TransformAxis rotation2: coordinates=arm_add_l axis=(-1 0 0) LinearFunction(coefficients=1 0)
        TransformAxis rotation3: coordinates=arm_rot_l axis=(0 -1 0) LinearFunction(coefficients=1 0)
    PinJoint elbow_l: socket_parent_frame=humerus_l_offset socket_child_frame=ulna_l_offset
      Coordinate elbow_flex_l: default_value=0 range=(0 2.618) clamped=true
      PhysicalOffsetFrame humerus_l_offset: socket_parent=/bodyset/humerus_l
          translation=(0.01369297 -0.2982294 0.009995743) orientation=(0.0228627 -0.228018 0.0051689)
      PhysicalOffsetFrame ulna_l_offset: socket_parent=/bodyset/ulna_l translation=(0 0 0)
          orientation=(0.0228627 -0.228018 0.0051689)
    PinJoint radioulnar_l: socket_parent_frame=ulna_l_offset socket_child_frame=radius_l_offset
      Coordinate pro_sup_l: default_value=0 range=(0 1.570796) clamped=true
      PhysicalOffsetFrame ulna_l_offset: socket_parent=/bodyset/ulna_l
          translation=(-0.006350038 -0.01227812 -0.02462138) orientation=(1.56884 -0.056428 1.53614)
      PhysicalOffsetFrame radius_l_offset: socket_parent=/bodyset/radius_l translation=(0 0 0)
          orientation=(1.56884 -0.056428 1.53614)
    UniversalJoint radius_hand_l: socket_parent_frame=radius_l_offset socket_child_frame=hand_l_offset
      Coordinate wrist_flex_l: default_value=0 range=(-1.22173 1.22173) clamped=true locked=true
      Coordinate wrist_dev_l: default_value=0 range=(-0.4363323 0.6108652) clamped=true locked=true
      PhysicalOffsetFrame radius_l_offset: socket_parent=/bodyset/radius_l
          translation=(-0.008304041 -0.2226251 -0.01284733) orientation=(1.5708 0 1.5708)
      PhysicalOffsetFrame hand_l_offset: socket_parent=/bodyset/hand_l translation=(0 0 0)
          orientation=(1.5708 0 1.5708)
  ConstraintSet:
    CoordinateCouplerConstraint patellofemoral_knee_angle_r_con: independent_coordinate_names=knee_angle_r
        dependent_coordinate_name=knee_angle_r_beta scale_factor=1
        coupled_coordinates_function=LinearFunction(coefficients=1 0)
    CoordinateCouplerConstraint patellofemoral_knee_angle_l_con: independent_coordinate_names=knee_angle_l
        dependent_coordinate_name=knee_angle_l_beta scale_factor=1
        coupled_coordinates_function=LinearFunction(coefficients=1 0)
  ForceSet:
    Millard2012EquilibriumMuscle [values shared by the 80 below unless stated]: fiber_damping=0.01
        default_activation=0.01 minimum_activation=0.01
      ActiveForceLengthCurve: min_norm_active_fiber_length=0.25 transition_norm_fiber_length=0.77
          max_norm_active_fiber_length=1.9 shallow_ascending_slope=0.75 minimum_value=0
      ForceVelocityCurve: concentric_slope_at_vmax=0 concentric_slope_near_vmax=0.25 isometric_slope=5
          eccentric_slope_at_vmax=0 eccentric_slope_near_vmax=0.15 max_eccentric_velocity_force_multiplier=1.4
      TendonForceLengthCurve
    Millard2012EquilibriumMuscle addbrev_r: max_isometric_force=625.8197 optimal_fiber_length=0.1011702
        tendon_slack_length=0.03478674 pennation_angle_at_optimal=0.1147809 [radians]
      PathPoint P1: pelvis (-0.02164629 -0.08524921 0.01445807)
      PathPoint P2: femur_r (-0.002274202 -0.1107748 0.02831382)
      PathWrap: wrap_object=AB_at_femshaft_r method=hybrid
      FiberForceLengthCurve: strain_at_zero_force=-0.1927643 strain_at_one_norm_force=0.5015522
          stiffness_at_low_force=0.2 stiffness_at_one_norm_force=2.880531 curviness=0.75
    Millard2012EquilibriumMuscle addlong_r: max_isometric_force=916.8 optimal_fiber_length=0.1027679
        tendon_slack_length=0.1251824 pennation_angle_at_optimal=0.1377704
      PathPoint P1: pelvis (-0.008590516 -0.08062399 0.01772522)
      PathPoint P2: femur_r (0.01280376 -0.2247132 0.01800031)
      PathWrap: wrap_object=AL_at_femshaft_r method=hybrid
      FiberForceLengthCurve: strain_at_zero_force=-0.1917374 strain_at_one_norm_force=0.5002995
          stiffness_at_low_force=0.2 stiffness_at_one_norm_force=2.890019 curviness=0.75
    Millard2012EquilibriumMuscle addmagDist_r: max_isometric_force=597.2951 optimal_fiber_length=0.1689432
        tendon_slack_length=0.08330909 pennation_angle_at_optimal=0.194705
      PathPoint P1: pelvis (-0.08391052 -0.1157848 0.03738444)
      PathPoint P2: femur_r (0.01279239 -0.246427 0.02194605)
      PathWrap: wrap_object=AMdist_at_femshaft_r method=hybrid
      FiberForceLengthCurve: strain_at_zero_force=-3.981963e-9 strain_at_one_norm_force=0.7 stiffness_at_low_force=0.2
          stiffness_at_one_norm_force=2.857143 curviness=0.75
    Millard2012EquilibriumMuscle addmagIsch_r: max_isometric_force=597.2951 optimal_fiber_length=0.1478752
        tendon_slack_length=0.2048128 pennation_angle_at_optimal=0.1680443
      PathPoint P1: pelvis (-0.1015675 -0.1176802 0.03915884)
      PathPoint P2: femur_r (0.005469456 -0.3642143 -0.03721732)
      PathWrap: wrap_object=AMisch_at_condyles_r method=hybrid
      FiberForceLengthCurve: strain_at_zero_force=0.007389956 strain_at_one_norm_force=0.7000392
          stiffness_at_low_force=0.2 stiffness_at_one_norm_force=2.887464 curviness=0.75
    Millard2012EquilibriumMuscle addmagMid_r: max_isometric_force=597.2951 optimal_fiber_length=0.1334927
        tendon_slack_length=0.04520303 pennation_angle_at_optimal=0.2073076
      PathPoint P1: pelvis (-0.05968028 -0.109509 0.02679437)
      PathPoint P2: femur_r (0.002751785 -0.1524561 0.03322609)
      PathWrap: wrap_object=AMmid_at_femshaft_r method=hybrid
      FiberForceLengthCurve: strain_at_zero_force=-3.981963e-9 strain_at_one_norm_force=0.7 stiffness_at_low_force=0.2
          stiffness_at_one_norm_force=2.857143 curviness=0.75
    Millard2012EquilibriumMuscle addmagProx_r: max_isometric_force=597.2951 optimal_fiber_length=0.1074984
        tendon_slack_length=0.04104901 pennation_angle_at_optimal=0.3114833
      PathPoint P1: pelvis (-0.03511005 -0.0975378 0.01281511)
      PathPoint P2: femur_r (-0.01736353 -0.07403135 0.03640998)
      PathWrap: wrap_object=AMprox_at_femshaft_r method=hybrid
      FiberForceLengthCurve: strain_at_zero_force=-3.981963e-9 strain_at_one_norm_force=0.7 stiffness_at_low_force=0.2
          stiffness_at_one_norm_force=2.857143 curviness=0.75
    Millard2012EquilibriumMuscle bflh_r: max_isometric_force=1313.184 optimal_fiber_length=0.091738
        tendon_slack_length=0.305693 pennation_angle_at_optimal=0.1759182
      PathPoint P1: pelvis (-0.1178646 -0.1080126 0.05501577)
      PathPoint P2: tibia_r (-0.02962757 -0.03217157 0.02224266)
      PathPoint P3: tibia_r (-0.02523179 -0.04182304 0.02663844)
      FiberForceLengthCurve: strain_at_zero_force=0.1965607 strain_at_one_norm_force=0.7068715
          stiffness_at_low_force=0.2 stiffness_at_one_norm_force=3.91918 curviness=0.75
    Millard2012EquilibriumMuscle bfsh_r: max_isometric_force=557.1148 optimal_fiber_length=0.103246
        tendon_slack_length=0.0990499 pennation_angle_at_optimal=0.2642232
      PathPoint P1: femur_r (0.005685505 -0.1981742 0.02660817)
      PathPoint P2: tibia_r (-0.02646261 -0.03851397 0.02795717)
      PathWrap: wrap_object=BF_at_gastroc_r method=hybrid
      FiberForceLengthCurve: strain_at_zero_force=0.115251 strain_at_one_norm_force=0.6888986
          stiffness_at_low_force=0.2 stiffness_at_one_norm_force=3.486462 curviness=0.75
    Millard2012EquilibriumMuscle edl_r: max_isometric_force=603.4982 optimal_fiber_length=0.06270836
        tendon_slack_length=0.3337888 pennation_angle_at_optimal=0.2182582
      PathPoint P1: tibia_r (-0.0140665 -0.10635 0.01802271)
      PathPoint P2: tibia_r (0.01441817 -0.3456146 0.009846552)
      PathPoint P3: calcn_r (0.07933584 0.036 0.0007033251)
      PathPoint P4: calcn_r (0.1395068 0.0055 0.01142903)
      PathPoint P5: toes_r (0.0002589853 0.0047 0.01345109)
      PathPoint P6: toes_r (0.0382435 -0.0004 0.02197891)
      FiberForceLengthCurve: strain_at_zero_force=0.1317998 strain_at_one_norm_force=0.7072192
          stiffness_at_low_force=0.2 stiffness_at_one_norm_force=3.475726 curviness=0.75
    Millard2012EquilibriumMuscle ehl_r: max_isometric_force=285.8675 optimal_fiber_length=0.06740275
        tendon_slack_length=0.2944773 pennation_angle_at_optimal=0.1972681
      PathPoint P1: tibia_r (-0.01230819 -0.1424741 0.01661606)
      PathPoint P2: tibia_r (0.006242011 -0.2673917 0.01441817)
      PathPoint P3: tibia_r (0.01758313 -0.339456 -0.002461638)
      PathPoint P4: calcn_r (0.08373859 0.0389 -0.0185502)
      PathPoint P5: calcn_r (0.1116227 0.0309 -0.02259432)
      PathPoint P6: calcn_r (0.1496935 0.0139 -0.02461638)
      PathPoint P7: toes_r (0.02572587 0.0041 -0.02153933)
      PathPoint P8: toes_r (0.04860291 0.0034 -0.01635231)
      FiberForceLengthCurve: strain_at_zero_force=0.1051406 strain_at_one_norm_force=0.7178208
          stiffness_at_low_force=0.2 stiffness_at_one_norm_force=3.264346 curviness=0.75
    Millard2012EquilibriumMuscle fdl_r: max_isometric_force=423.177 optimal_fiber_length=0.04014993
        tendon_slack_length=0.3409799 pennation_angle_at_optimal=0.2248391
      PathPoint P1: tibia_r (-0.00202206 -0.1683952 -0.001582482)
      PathPoint P2: tibia_r (-0.01547315 -0.3350439 -0.01090154)
      PathPoint P3: calcn_r (0.0376392 0.0315 -0.02461638)
      PathPoint P4: calcn_r (0.06112054 0.0176 -0.02312181)
      PathPoint P5: calcn_r (0.1431326 -0.0081 0.01019821)
      PathPoint P6: toes_r (-0.00164024 -0.0078 0.0129236)
      PathPoint P7: toes_r (0.02460361 -0.0071 0.01890186)
      PathPoint P8: toes_r (0.03807084 -0.006 0.02127559)
      FiberForceLengthCurve: strain_at_zero_force=-0.01205975 strain_at_one_norm_force=0.6997089
          stiffness_at_low_force=0.2 stiffness_at_one_norm_force=2.809902 curviness=0.75
    Millard2012EquilibriumMuscle fhl_r: max_isometric_force=907.8393 optimal_fiber_length=0.04725427
        tendon_slack_length=0.3177241 pennation_angle_at_optimal=0.2580255
      PathPoint P1: tibia_r (-0.02725385 -0.1988203 0.01758313)
      PathPoint P2: tibia_r (-0.02127559 -0.3374338 -0.006681589)
      PathPoint P3: calcn_r (0.03228684 0.0276 -0.02118767)
      PathPoint P4: calcn_r (0.08960892 0.0068 -0.0225064)
      PathPoint P5: calcn_r (0.1490029 -0.0053 -0.02364931)
      PathPoint P6: toes_r (0.01338091 -0.0064 -0.02329765)
      PathPoint P7: toes_r (0.04851658 -0.0102 -0.01591273)
      FiberForceLengthCurve: strain_at_zero_force=0.01130745 strain_at_one_norm_force=0.7002505
          stiffness_at_low_force=0.2 stiffness_at_one_norm_force=2.902997 curviness=0.75
    Millard2012EquilibriumMuscle gaslat_r: max_isometric_force=1575.059 optimal_fiber_length=0.05403452
        tendon_slack_length=0.3455913 pennation_angle_at_optimal=0.2102268
      PathPoint P1: femur_r (-0.003411303 -0.3580466 0.0314977)
      PathPoint P2: calcn_r (0.003798451 0.031 -0.004659529)
      PathWrap: wrap_object=GasLat_at_shank_r method=hybrid
      PathWrap pathwrap_0: wrap_object=Gastroc_at_condyles_r method=hybrid
      FiberForceLengthCurve: strain_at_zero_force=-0.05983233 strain_at_one_norm_force=0.7435102
          stiffness_at_low_force=0.2 stiffness_at_one_norm_force=2.489598 curviness=0.75
    Millard2012EquilibriumMuscle gasmed_r: max_isometric_force=3115.515 optimal_fiber_length=0.04711876
        tendon_slack_length=0.3683729 pennation_angle_at_optimal=0.1656816
      PathPoint P1: femur_r (0.009096809 -0.3556058 -0.0236517)
      PathPoint P2: calcn_r (0.003798451 0.031 -0.004659529)
      PathWrap: wrap_object=GasMed_at_shank_r method=hybrid
      PathWrap pathwrap_0: wrap_object=Gastroc_at_condyles_r method=hybrid
      FiberForceLengthCurve: strain_at_zero_force=0.1998358 strain_at_one_norm_force=0.7902371
          stiffness_at_low_force=0.2 stiffness_at_one_norm_force=3.387526 curviness=0.75
    Millard2012EquilibriumMuscle glmax1_r: max_isometric_force=983.7836 optimal_fiber_length=0.1407433
        tendon_slack_length=0.04676208 pennation_angle_at_optimal=0.3540118
      PathPoint P1: pelvis (-0.1395109 0.03128828 0.05285645)
      PathPoint P2: pelvis (-0.1424575 -0.02194714 0.0731353)
      PathPoint P3: femur_r (-0.05048729 -0.03060388 0.03434045)
      PathPoint P4: femur_r (-0.0314977 -0.05313434 0.05344375)
      PathWrap: wrap_object=Gmax1_at_pelvis_r method=hybrid
      FiberForceLengthCurve: strain_at_zero_force=-0.07534176 strain_at_one_norm_force=0.8468075
          stiffness_at_low_force=0.2 stiffness_at_one_norm_force=2.168846 curviness=0.75
    Millard2012EquilibriumMuscle glmax2_r: max_isometric_force=1406.046 optimal_fiber_length=0.1516472
        tendon_slack_length=0.06557258 pennation_angle_at_optimal=0.3673821
      PathPoint P1: pelvis (-0.1492574 0.007890087 0.04337421)
      PathPoint P2: pelvis (-0.1523173 -0.05523061 0.07632734)
      PathPoint P3: femur_r (-0.05116955 -0.05482413 0.02865495)
      PathPoint P4: femur_r (-0.01773878 -0.09537897 0.04764453)
      PathWrap: wrap_object=Gmax2_at_pelvis_r method=hybrid
      FiberForceLengthCurve: strain_at_zero_force=0.199275 strain_at_one_norm_force=0.7164175
          stiffness_at_low_force=0.2 stiffness_at_one_norm_force=3.867406 curviness=0.75
    Millard2012EquilibriumMuscle glmax3_r: max_isometric_force=947.7541 optimal_fiber_length=0.1647221
        tendon_slack_length=0.06876565 pennation_angle_at_optimal=0.3824161
      PathPoint P1: pelvis (-0.1473307 -0.04761259 0.008449522)
      PathPoint P2: pelvis (-0.1442708 -0.1145423 0.04083935)
      PathPoint P3: femur_r (-0.03195254 -0.1056116 0.01068875)
      PathPoint P4: femur_r (-0.006822606 -0.1332114 0.04673485)
      PathWrap: wrap_object=Gmax3_at_pelvis_r method=hybrid
      FiberForceLengthCurve: strain_at_zero_force=0.1989714 strain_at_one_norm_force=0.7121937
          stiffness_at_low_force=0.2 stiffness_at_one_norm_force=3.896947 curviness=0.75
    Millard2012EquilibriumMuscle glmed1_r: max_isometric_force=1093.467 optimal_fiber_length=0.07200573
        tendon_slack_length=0.0550566 pennation_angle_at_optimal=0.3165559
      PathPoint P1: pelvis (-0.05568808 0.02371856 0.1082368)
      PathPoint P2_0: femur_r (-0.01579633 -0.01717451 0.06730458)
      FiberForceLengthCurve: strain_at_zero_force=-3.729382e-9 strain_at_one_norm_force=0.7 stiffness_at_low_force=0.2
          stiffness_at_one_norm_force=2.857143 curviness=0.75
    Millard2012EquilibriumMuscle glmed2_r: max_isometric_force=765.0917 optimal_fiber_length=0.0793714
        tendon_slack_length=0.07094369 pennation_angle_at_optimal=0.3165559
      PathPoint P1: pelvis (-0.09602261 0.04954786 0.07696906)
      PathPoint P2_0: femur_r (-0.02505718 -0.009349295 0.06382119)
      FiberForceLengthCurve: strain_at_zero_force=0.06397124 strain_at_one_norm_force=0.7014005
          stiffness_at_low_force=0.2 stiffness_at_one_norm_force=3.137603 curviness=0.75
    Millard2012EquilibriumMuscle glmed3_r: max_isometric_force=871.1993 optimal_fiber_length=0.07578662
        tendon_slack_length=0.04695951 pennation_angle_at_optimal=0.3165559
      PathPoint P1: pelvis (-0.1131792 0.01411091 0.05999313)
      PathPoint P2_0: femur_r (-0.03513642 -0.004412216 0.05890184)
      FiberForceLengthCurve: strain_at_zero_force=0.1252157 strain_at_one_norm_force=0.7030514
          stiffness_at_low_force=0.2 stiffness_at_one_norm_force=3.461191 curviness=0.75
    Millard2012EquilibriumMuscle glmin1_r: max_isometric_force=374.0459 optimal_fiber_length=0.07726913
        tendon_slack_length=0.01833754 pennation_angle_at_optimal=0.1745329
      PathPoint P1: pelvis (-0.03352288 -9.814238e-5 0.1112093)
      PathPoint P2: femur_r (0.00624191 -0.01454022 0.06372065)
      FiberForceLengthCurve: strain_at_zero_force=-3.729382e-9 strain_at_one_norm_force=0.7 stiffness_at_low_force=0.2
          stiffness_at_one_norm_force=2.857143 curviness=0.75
    Millard2012EquilibriumMuscle glmin2_r: max_isometric_force=394.8197 optimal_fiber_length=0.06519355
        tendon_slack_length=0.03038375 pennation_angle_at_optimal=0
      PathPoint P1: pelvis (-0.0698121 0.009069307 0.09495885)
      PathPoint P2: femur_r (0.004029364 -0.008460442 0.05965724)
      FiberForceLengthCurve: strain_at_zero_force=0.003039474 strain_at_one_norm_force=0.7000285
          stiffness_at_low_force=0.2 stiffness_at_one_norm_force=2.869486 curviness=0.75
    Millard2012EquilibriumMuscle glmin3_r: max_isometric_force=446.7738 optimal_fiber_length=0.0357085
        tendon_slack_length=0.04780476 pennation_angle_at_optimal=0.01745329
      PathPoint P1: pelvis (-0.08941843 -0.01405705 0.07491909)
      PathPoint P2: femur_r (-0.00406643 -0.00118914 0.05828968)
      FiberForceLengthCurve: strain_at_zero_force=0.007461173 strain_at_one_norm_force=0.7002322
          stiffness_at_low_force=0.2 stiffness_at_one_norm_force=2.886957 curviness=0.75
    Millard2012EquilibriumMuscle grac_r: max_isometric_force=281.3115 optimal_fiber_length=0.2137512
        tendon_slack_length=0.1614055 pennation_angle_at_optimal=0.1720016
      PathPoint P1: pelvis (-0.05367372 -0.1172812 0.02305781)
      PathPoint P2: tibia_r (-0.01619406 -0.04370738 -0.02603182)
      PathPoint P3: tibia_r (0.001564898 -0.06399385 -0.01382913)
      PathWrap: wrap_object=GR_at_condyles_r method=hybrid
      FiberForceLengthCurve: strain_at_zero_force=-0.1969779 strain_at_one_norm_force=0.8027483
          stiffness_at_low_force=0.2 stiffness_at_one_norm_force=2.000548 curviness=0.75
    Millard2012EquilibriumMuscle iliacus_r: max_isometric_force=1021.141 optimal_fiber_length=0.1040028
        tendon_slack_length=0.09377883 pennation_angle_at_optimal=0.279914
      PathPoint P1: pelvis (-0.06856546 0.02802341 0.07914385)
      PathPoint P2: pelvis (-0.01529973 -0.05051469 0.07097598)
      PathPoint P3: femur_r (-0.002615332 -0.05773431 0.0158057)
      PathPoint P4: femur_r (-0.01387263 -0.05979961 0.02228718)
      PathWrap: wrap_object=IL_at_brim_r method=hybrid range=(2 3)
      FiberForceLengthCurve: strain_at_zero_force=-0.1703103 strain_at_one_norm_force=0.5005449
          stiffness_at_low_force=0.2 stiffness_at_one_norm_force=2.98127 curviness=0.75
    Millard2012EquilibriumMuscle perbrev_r: max_isometric_force=521.2016 optimal_fiber_length=0.04151337
        tendon_slack_length=0.1348979 pennation_angle_at_optimal=0.2052361
      PathPoint P1: tibia_r (-0.0213635 -0.2327383 0.02206683)
      PathPoint P2: tibia_r (-0.0298034 -0.3578398 0.02189099)
      PathPoint P3: tibia_r (-0.02505596 -0.3680428 0.02241849)
      PathPoint P4: calcn_r (0.04066069 0.027 0.02048434)
      PathPoint P5: calcn_r (0.05844435 0.0219 0.03015507)
      FiberForceLengthCurve: strain_at_zero_force=-0.04234068 strain_at_one_norm_force=0.6987541
          stiffness_at_low_force=0.2 stiffness_at_one_norm_force=2.69871 curviness=0.75
    Millard2012EquilibriumMuscle perlong_r: max_isometric_force=1115.371 optimal_fiber_length=0.04626983
        tendon_slack_length=0.3025944 pennation_angle_at_optimal=0.2479525
      PathPoint P1: tibia_r (-0.01758313 -0.1262045 0.02479221)
      PathPoint P2: tibia_r (-0.02786926 -0.3584832 0.02083601)
      PathPoint P3: tibia_r (-0.02391305 -0.368962 0.02109975)
      PathPoint P4: calcn_r (0.03781186 0.023 0.01942936)
      PathPoint P5: calcn_r (0.05878967 0.0106 0.02496804)
      PathPoint P6: calcn_r (0.07355183 0.0069 0.01037405)
      PathPoint P7: calcn_r (0.1038531 0.0085 -0.01617648)
      FiberForceLengthCurve: strain_at_zero_force=-0.1323481 strain_at_one_norm_force=0.6924185
          stiffness_at_low_force=0.2 stiffness_at_one_norm_force=2.424929 curviness=0.75
    Millard2012EquilibriumMuscle piri_r: max_isometric_force=1029.787 optimal_fiber_length=0.02579662
        tendon_slack_length=0.1140074 pennation_angle_at_optimal=0.1745329
      PathPoint P1: pelvis (-0.1153826 -0.0059221 0.01268367)
      PathPoint P2: pelvis (-0.1156206 -0.02780575 0.05719387)
      PathPoint P3: femur_r (-0.0168291 -0.00337957 0.04969132)
      FiberForceLengthCurve: strain_at_zero_force=0.09922992 strain_at_one_norm_force=0.7028348
          stiffness_at_low_force=0.2 stiffness_at_one_norm_force=3.313426 curviness=0.75
    Millard2012EquilibriumMuscle psoas_r: max_isometric_force=1426.79 optimal_fiber_length=0.1129739
        tendon_slack_length=0.09620003 pennation_angle_at_optimal=0.2155251
      PathPoint P1: pelvis (-0.06867879 0.0562282 0.03661459)
      PathPoint P2: pelvis (-0.02323292 -0.05931169 0.06158762)
      PathPoint P3: femur_r (-0.01500973 -0.04853438 0.005230665)
      PathPoint P4: femur_r (-0.02672188 -0.04919151 0.01000649)
      PathWrap: wrap_object=PS_at_brim_r method=hybrid range=(2 3)
      FiberForceLengthCurve: strain_at_zero_force=-0.09543841 strain_at_one_norm_force=0.5010382
          stiffness_at_low_force=0.2 stiffness_at_one_norm_force=3.353023 curviness=0.75
    Millard2012EquilibriumMuscle recfem_r: max_isometric_force=2191.741 optimal_fiber_length=0.07185377
        tendon_slack_length=0.4245843 pennation_angle_at_optimal=0.2170149
      PathPoint P1: pelvis (-0.02719952 -0.03518797 0.08759337)
      PathPoint P2: patella_r (0.01137101 0.05571795 0.0007959707)
      PathPoint P3: patella_r (0.01375892 0.04969132 -0.001137101)
      PathPoint P4: patella_r (0.005685505 0.00280864 3.411303e-5)
      PathPoint P5: tibia_r (0.0286605 -0.05801913 -0.0004132035)
      PathWrap: wrap_object=KnExt_at_fem_r method=hybrid
      FiberForceLengthCurve: strain_at_zero_force=0.1999726 strain_at_one_norm_force=0.8999622
          stiffness_at_low_force=0.2 stiffness_at_one_norm_force=2.857186 curviness=0.75
    Millard2012EquilibriumMuscle sart_r: max_isometric_force=249.4131 optimal_fiber_length=0.3767467
        tendon_slack_length=0.1159219 pennation_angle_at_optimal=0.02613542
      PathPoint P1: pelvis (-0.02209961 -0.01414774 0.09914105)
      PathPoint P2: femur_r (-0.003411303 -0.3349529 -0.04787196)
      PathPoint P3: tibia_r (-0.02206683 -0.03685943 -0.03208921)
      PathPoint P4: tibia_r (-0.01397859 -0.05505935 -0.02320973)
      PathPoint P5: tibia_r (0.01195653 -0.07445421 -0.002285807)
      FiberForceLengthCurve: strain_at_zero_force=-0.1984568 strain_at_one_norm_force=0.7212821
          stiffness_at_low_force=0.2 stiffness_at_one_norm_force=2.17453 curviness=0.75
    Millard2012EquilibriumMuscle semimem_r: max_isometric_force=2200.987 optimal_fiber_length=0.06490214
        tendon_slack_length=0.3269431 pennation_angle_at_optimal=0.2545615
      PathPoint P1: pelvis (-0.111858 -0.1033873 0.05764451)
      PathPoint P2: tibia_r (-0.02549554 -0.03833013 -0.01723147)
      PathWrap: wrap_object=SM_at_condyles_r method=hybrid
      FiberForceLengthCurve: strain_at_zero_force=0.1994426 strain_at_one_norm_force=0.7353994
          stiffness_at_low_force=0.2 stiffness_at_one_norm_force=3.731644 curviness=0.75
    Millard2012EquilibriumMuscle semiten_r: max_isometric_force=591.2951 optimal_fiber_length=0.1807692
        tendon_slack_length=0.2315335 pennation_angle_at_optimal=0.241295
      PathPoint P1: pelvis (-0.1176379 -0.1136354 0.04835004)
      PathPoint P2: tibia_r (-0.02742968 -0.04669474 -0.02013268)
      PathPoint P3: tibia_r (0.001670397 -0.07105321 -0.01028613)
      PathWrap: wrap_object=ST_at_condyles_r method=hybrid
      FiberForceLengthCurve: strain_at_zero_force=0.007279189 strain_at_one_norm_force=0.7803276
          stiffness_at_low_force=0.2 stiffness_at_one_norm_force=2.58716 curviness=0.75
    Millard2012EquilibriumMuscle soleus_r: max_isometric_force=6194.843 optimal_fiber_length=0.04051348
        tendon_slack_length=0.254826 pennation_angle_at_optimal=0.3814289
      PathPoint P1: tibia_r (-0.006681589 -0.0841976 0.008615733)
      PathPoint P2: calcn_r (0.003798451 0.031 -0.004659529)
      FiberForceLengthCurve: strain_at_zero_force=0.1569032 strain_at_one_norm_force=0.8506533
          stiffness_at_low_force=0.2 stiffness_at_one_norm_force=2.882882 curviness=0.75
    Millard2012EquilibriumMuscle tfl_r: max_isometric_force=411.2066 optimal_fiber_length=0.08731631
        tendon_slack_length=0.4131413 pennation_angle_at_optimal=0.05235988
      PathPoint P1: pelvis (-0.02305135 0.009841157 0.1213892)
      PathPoint P2: femur_r (0.03343077 -0.09340755 0.06788493)
      PathPoint P3: femur_r (0.01216698 -0.3802016 0.03684207)
      PathPoint P4: tibia_r (0.009494889 -0.0376867 0.03041881)
      FiberForceLengthCurve: strain_at_zero_force=0.07118385 strain_at_one_norm_force=0.7197196
          stiffness_at_low_force=0.2 stiffness_at_one_norm_force=3.08387 curviness=0.75
    Millard2012EquilibriumMuscle tibant_r: max_isometric_force=1227.452 optimal_fiber_length=0.06283156
        tendon_slack_length=0.2212085 pennation_angle_at_optimal=0.1951828
      PathPoint P1: tibia_r (0.01353901 -0.1205974 0.01424233)
      PathPoint P2: tibia_r (0.02206683 -0.1751972 0.0112532)
      PathPoint P3: tibia_r (0.02048434 -0.3363308 -0.01160486)
      PathPoint P4: calcn_r (0.100659 0.0178 -0.02681427)
      FiberForceLengthCurve: strain_at_zero_force=0.1892237 strain_at_one_norm_force=0.7076768
          stiffness_at_low_force=0.2 stiffness_at_one_norm_force=3.85763 curviness=0.75
    Millard2012EquilibriumMuscle tibpost_r: max_isometric_force=1730.154 optimal_fiber_length=0.03467861
        tendon_slack_length=0.2575938 pennation_angle_at_optimal=0.2264891
      PathPoint P1: tibia_r (-0.003604541 -0.1198621 0.009055311)
      PathPoint P2: tibia_r (-0.01441817 -0.3359631 -0.01538524)
      PathPoint P3: calcn_r (0.03599896 0.0334 -0.02514387)
      PathPoint P4: calcn_r (0.06664556 0.0159 -0.0247043)
      FiberForceLengthCurve: strain_at_zero_force=-0.1916705 strain_at_one_norm_force=0.6862359
          stiffness_at_low_force=0.2 stiffness_at_one_norm_force=2.278147 curviness=0.75
    Millard2012EquilibriumMuscle vasint_r: max_isometric_force=1697.361 optimal_fiber_length=0.0956424
        tendon_slack_length=0.1947625 pennation_angle_at_optimal=0.06309973
      PathPoint P1: femur_r (0.03297593 -0.1806192 0.03525013)
      PathPoint P2: femur_r (0.03809289 -0.1956395 0.03240738)
      PathPoint P3: patella_r (0.006595186 0.05458085 -0.0006822606)
      PathPoint P4: patella_r (0.005685505 0.00280864 -0.0004434694)
      PathPoint P5: tibia_r (0.02863412 -0.05809267 0.0003780373)
      PathWrap: wrap_object=KnExt_at_fem_r method=hybrid
      FiberForceLengthCurve: strain_at_zero_force=0.1999153 strain_at_one_norm_force=0.8514363
          stiffness_at_low_force=0.2 stiffness_at_one_norm_force=3.06974 curviness=0.75
    Millard2012EquilibriumMuscle vaslat_r: max_isometric_force=5148.767 optimal_fiber_length=0.09661359
        tendon_slack_length=0.2144173 pennation_angle_at_optimal=0.2528673
      PathPoint P1: femur_r (0.005458085 -0.1740478 0.03968483)
      PathPoint P2: femur_r (0.03058802 -0.2432351 0.04650743)
      PathPoint P3: patella_r (0.01171214 0.04809938 0.01603313)
      PathPoint P4: patella_r (0.005685505 0.00280864 0.008334951)
      PathPoint P5: tibia_r (0.02860775 -0.05825812 0.004492489)
      PathWrap: wrap_object=KnExt_at_fem_r method=hybrid
      FiberForceLengthCurve: strain_at_zero_force=0.1999632 strain_at_one_norm_force=0.8928189
          stiffness_at_low_force=0.2 stiffness_at_one_norm_force=2.886604 curviness=0.75
    Millard2012EquilibriumMuscle vasmed_r: max_isometric_force=2747.823 optimal_fiber_length=0.09407372
        tendon_slack_length=0.1942742 pennation_angle_at_optimal=0.4222225
      PathPoint P1: femur_r (0.01591941 -0.1970477 0.0213775)
      PathPoint P2: femur_r (0.0404808 -0.2599452 0.001023391)
      PathPoint P3: patella_r (0.007163737 0.050601 -0.01933072)
      PathPoint P4: patella_r (0.005685505 0.00280864 -0.009665359)
      PathPoint P5: tibia_r (0.02804509 -0.05843277 -0.00596068)
      PathWrap: wrap_object=KnExt_at_fem_r method=hybrid
      FiberForceLengthCurve: strain_at_zero_force=0.1999354 strain_at_one_norm_force=0.8518332
          stiffness_at_low_force=0.2 stiffness_at_one_norm_force=3.067965 curviness=0.75
    Millard2012EquilibriumMuscle addbrev_l: max_isometric_force=625.8197 optimal_fiber_length=0.1007404
        tendon_slack_length=0.03463894 pennation_angle_at_optimal=0.1147809
      PathPoint P1: pelvis (-0.02164629 -0.08524921 -0.01445807)
      PathPoint P2: femur_l (-0.002217149 -0.1106182 -0.0276035)
      PathWrap: wrap_object=AB_at_femshaft_l method=hybrid
      FiberForceLengthCurve: strain_at_zero_force=-0.1927643 strain_at_one_norm_force=0.5015522
          stiffness_at_low_force=0.2 stiffness_at_one_norm_force=2.880531 curviness=0.75
    Millard2012EquilibriumMuscle addlong_l: max_isometric_force=916.8 optimal_fiber_length=0.1025981
        tendon_slack_length=0.1249756 pennation_angle_at_optimal=0.1377704
      PathPoint P1: pelvis (-0.008590516 -0.08062399 -0.01772522)
      PathPoint P2: femur_l (0.01248255 -0.2243957 -0.01754873)
      PathWrap: wrap_object=AL_at_femshaft_l method=hybrid
      FiberForceLengthCurve: strain_at_zero_force=-0.1917374 strain_at_one_norm_force=0.5002995
          stiffness_at_low_force=0.2 stiffness_at_one_norm_force=2.890019 curviness=0.75
    Millard2012EquilibriumMuscle addmagDist_l: max_isometric_force=597.2951 optimal_fiber_length=0.1685232
        tendon_slack_length=0.08310199 pennation_angle_at_optimal=0.194705
      PathPoint P1: pelvis (-0.08391052 -0.1157848 -0.03738444)
      PathPoint P2: femur_l (0.01247146 -0.2460787 -0.02139549)
      PathWrap: wrap_object=AMdist_at_femshaft_l method=hybrid
      FiberForceLengthCurve: strain_at_zero_force=-3.981963e-9 strain_at_one_norm_force=0.7 stiffness_at_low_force=0.2
          stiffness_at_one_norm_force=2.857143 curviness=0.75
    Millard2012EquilibriumMuscle addmagIsch_l: max_isometric_force=597.2951 optimal_fiber_length=0.1476183
        tendon_slack_length=0.204457 pennation_angle_at_optimal=0.1680443
      PathPoint P1: pelvis (-0.1015675 -0.1176802 -0.03915884)
      PathPoint P2: femur_l (0.005332243 -0.3636997 0.03628364)
      PathWrap: wrap_object=AMisch_at_condyles_l method=hybrid
      FiberForceLengthCurve: strain_at_zero_force=0.007389956 strain_at_one_norm_force=0.7000392
          stiffness_at_low_force=0.2 stiffness_at_one_norm_force=2.887464 curviness=0.75
    Millard2012EquilibriumMuscle addmagMid_l: max_isometric_force=597.2951 optimal_fiber_length=0.1328647
        tendon_slack_length=0.04499038 pennation_angle_at_optimal=0.2073076
      PathPoint P1: pelvis (-0.05968028 -0.109509 -0.02679437)
      PathPoint P2: femur_l (0.00268275 -0.1522407 -0.03239254)
      PathWrap: wrap_object=AMmid_at_femshaft_l method=hybrid
      FiberForceLengthCurve: strain_at_zero_force=-3.981963e-9 strain_at_one_norm_force=0.7 stiffness_at_low_force=0.2
          stiffness_at_one_norm_force=2.857143 curviness=0.75
    Millard2012EquilibriumMuscle addmagProx_l: max_isometric_force=597.2951 optimal_fiber_length=0.1065745
        tendon_slack_length=0.04069622 pennation_angle_at_optimal=0.3114833
      PathPoint P1: pelvis (-0.03511005 -0.0975378 -0.01281511)
      PathPoint P2: femur_l (-0.01692793 -0.07392673 -0.03549655)
      PathWrap: wrap_object=AMprox_at_femshaft_l method=hybrid
      FiberForceLengthCurve: strain_at_zero_force=-3.981963e-9 strain_at_one_norm_force=0.7 stiffness_at_low_force=0.2
          stiffness_at_one_norm_force=2.857143 curviness=0.75
    Millard2012EquilibriumMuscle bflh_l: max_isometric_force=1313.184 optimal_fiber_length=0.09144011
        tendon_slack_length=0.3047004 pennation_angle_at_optimal=0.1759182
      PathPoint P1: pelvis (-0.1178646 -0.1080126 -0.05501577)
      PathPoint P2: tibia_l (-0.03016391 -0.03144751 -0.02264531)
      PathPoint P3: tibia_l (-0.02568855 -0.04088177 -0.02712067)
      FiberForceLengthCurve: strain_at_zero_force=0.1965607 strain_at_one_norm_force=0.7068715
          stiffness_at_low_force=0.2 stiffness_at_one_norm_force=3.91918 curviness=0.75
    Millard2012EquilibriumMuscle bfsh_l: max_isometric_force=557.1148 optimal_fiber_length=0.1027614
        tendon_slack_length=0.09858502 pennation_angle_at_optimal=0.2642232
      PathPoint P1: femur_l (0.005542872 -0.1978942 -0.02594064)
      PathPoint P2: tibia_l (-0.02694166 -0.03764717 -0.02846328)
      PathWrap: wrap_object=BF_at_gastroc_l method=hybrid
      FiberForceLengthCurve: strain_at_zero_force=0.115251 strain_at_one_norm_force=0.6888986
          stiffness_at_low_force=0.2 stiffness_at_one_norm_force=3.486462 curviness=0.75
    Millard2012EquilibriumMuscle edl_l: max_isometric_force=603.4982 optimal_fiber_length=0.06099886
        tendon_slack_length=0.3246893 pennation_angle_at_optimal=0.2182582
      PathPoint P1: tibia_l (-0.01432115 -0.1039565 -0.01834897)
      PathPoint P2: tibia_l (0.01467917 -0.3378361 -0.0100248)
      PathPoint P3: calcn_l (0.07604656 0.036 -0.0007160573)
      PathPoint P4: calcn_l (0.1337228 0.0055 -0.01163593)
      PathPoint P5: toes_l (0.0002482478 0.0047 -0.0136946)
      PathPoint P6: toes_l (0.03665792 -0.0004 -0.02237679)
      FiberForceLengthCurve: strain_at_zero_force=0.1317998 strain_at_one_norm_force=0.7072192
          stiffness_at_low_force=0.2 stiffness_at_one_norm_force=3.475726 curviness=0.75
    Millard2012EquilibriumMuscle ehl_l: max_isometric_force=285.8675 optimal_fiber_length=0.06552429
        tendon_slack_length=0.2862704 pennation_angle_at_optimal=0.1972681
      PathPoint P1: tibia_l (-0.012531 -0.1392676 -0.01691685)
      PathPoint P2: tibia_l (0.006355008 -0.2613738 -0.01467917)
      PathPoint P3: tibia_l (0.01790143 -0.3318162 0.0025062)
      PathPoint P4: calcn_l (0.08026677 0.0389 0.01888601)
      PathPoint P5: calcn_l (0.1069948 0.0309 0.02300334)
      PathPoint P6: calcn_l (0.1434872 0.0139 0.025062)
      PathPoint P7: toes_l (0.02465928 0.0041 0.02192925)
      PathPoint P8: toes_l (0.04658783 0.0034 0.01664833)
      FiberForceLengthCurve: strain_at_zero_force=0.1051406 strain_at_one_norm_force=0.7178208
          stiffness_at_low_force=0.2 stiffness_at_one_norm_force=3.264346 curviness=0.75
    Millard2012EquilibriumMuscle fdl_l: max_isometric_force=423.177 optimal_fiber_length=0.03910642
        tendon_slack_length=0.3321177 pennation_angle_at_optimal=0.2248391
      PathPoint P1: tibia_l (-0.002058665 -0.1646053 0.001611129)
      PathPoint P2: tibia_l (-0.01575326 -0.3275034 0.01109889)
      PathPoint P3: calcn_l (0.03607867 0.0315 0.025062)
      PathPoint P4: calcn_l (0.05858647 0.0176 0.02354038)
      PathPoint P5: calcn_l (0.1371983 -0.0081 -0.01038283)
      PathPoint P6: toes_l (-0.001572236 -0.0078 -0.01315755)
      PathPoint P7: toes_l (0.02358354 -0.0071 -0.01924404)
      PathPoint P8: toes_l (0.03649242 -0.006 -0.02166073)
      FiberForceLengthCurve: strain_at_zero_force=-0.01205975 strain_at_one_norm_force=0.6997089
          stiffness_at_low_force=0.2 stiffness_at_one_norm_force=2.809902 curviness=0.75
    Millard2012EquilibriumMuscle fhl_l: max_isometric_force=907.8393 optimal_fiber_length=0.04590301
        tendon_slack_length=0.3086387 pennation_angle_at_optimal=0.2580255
      PathPoint P1: tibia_l (-0.02774722 -0.1943456 -0.01790143)
      PathPoint P2: tibia_l (-0.02166073 -0.3298395 0.006802544)
      PathPoint P3: calcn_l (0.03094822 0.0276 0.02157123)
      PathPoint P4: calcn_l (0.08589372 0.0068 0.02291383)
      PathPoint P5: calcn_l (0.1428252 -0.0053 0.02407743)
      PathPoint P6: toes_l (0.01282613 -0.0064 0.0237194)
      PathPoint P7: toes_l (0.04650508 -0.0102 0.0162008)
      FiberForceLengthCurve: strain_at_zero_force=0.01130745 strain_at_one_norm_force=0.7002505
          stiffness_at_low_force=0.2 stiffness_at_one_norm_force=2.902997 curviness=0.75
    Millard2012EquilibriumMuscle gaslat_l: max_isometric_force=1575.059 optimal_fiber_length=0.05299189
        tendon_slack_length=0.3389229 pennation_angle_at_optimal=0.2102268
      PathPoint P1: femur_l (-0.003325723 -0.3575407 -0.03070751)
      PathPoint P2: calcn_l (0.003640967 0.031 0.004743879)
      PathWrap: wrap_object=GasLat_at_shank_l method=hybrid
      PathWrap pathwrap_0: wrap_object=Gastroc_at_condyles_l method=hybrid
      FiberForceLengthCurve: strain_at_zero_force=-0.05983233 strain_at_one_norm_force=0.7435102
          stiffness_at_low_force=0.2 stiffness_at_one_norm_force=2.489598 curviness=0.75
    Millard2012EquilibriumMuscle gasmed_l: max_isometric_force=3115.515 optimal_fiber_length=0.04620367
        tendon_slack_length=0.3612188 pennation_angle_at_optimal=0.1656816
      PathPoint P1: femur_l (0.008868595 -0.3551033 0.02305835)
      PathPoint P2: calcn_l (0.003640967 0.031 0.004743879)
      PathWrap: wrap_object=GasMed_at_shank_l method=hybrid
      PathWrap pathwrap_0: wrap_object=Gastroc_at_condyles_l method=hybrid
      FiberForceLengthCurve: strain_at_zero_force=0.1998358 strain_at_one_norm_force=0.7902371
          stiffness_at_low_force=0.2 stiffness_at_one_norm_force=3.387526 curviness=0.75
    Millard2012EquilibriumMuscle glmax1_l: max_isometric_force=983.7836 optimal_fiber_length=0.1403682
        tendon_slack_length=0.04663746 pennation_angle_at_optimal=0.3540118
      PathPoint P1: pelvis (-0.1395109 0.03128828 -0.05285645)
      PathPoint P2: pelvis (-0.1424575 -0.02194714 -0.0731353)
      PathPoint P3: femur_l (-0.0492207 -0.03056063 -0.03347895)
      PathPoint P4: femur_l (-0.03070751 -0.05305926 -0.052103)
      PathWrap: wrap_object=Gmax1_at_pelvis_l method=hybrid
      FiberForceLengthCurve: strain_at_zero_force=-0.07534176 strain_at_one_norm_force=0.8468075
          stiffness_at_low_force=0.2 stiffness_at_one_norm_force=2.168846 curviness=0.75
    Millard2012EquilibriumMuscle glmax2_l: max_isometric_force=1406.046 optimal_fiber_length=0.1513631
        tendon_slack_length=0.06544976 pennation_angle_at_optimal=0.3673821
      PathPoint P1: pelvis (-0.1492574 0.007890087 -0.04337421)
      PathPoint P2: pelvis (-0.1523173 -0.05523061 -0.07632734)
      PathPoint P3: femur_l (-0.04988585 -0.05474666 -0.02793607)
      PathPoint P4: femur_l (-0.01729376 -0.09524418 -0.04644927)
      PathWrap: wrap_object=Gmax2_at_pelvis_l method=hybrid
      FiberForceLengthCurve: strain_at_zero_force=0.199275 strain_at_one_norm_force=0.7164175
          stiffness_at_low_force=0.2 stiffness_at_one_norm_force=3.867406 curviness=0.75
    Millard2012EquilibriumMuscle glmax3_l: max_isometric_force=947.7541 optimal_fiber_length=0.1641547
        tendon_slack_length=0.06852881 pennation_angle_at_optimal=0.3824161
      PathPoint P1: pelvis (-0.1473307 -0.04761259 -0.008449522)
      PathPoint P2: pelvis (-0.1442708 -0.1145423 -0.04083935)
      PathPoint P3: femur_l (-0.03115094 -0.1054623 -0.0104206)
      PathPoint P4: femur_l (-0.006651446 -0.1330231 -0.04556241)
      PathWrap: wrap_object=Gmax3_at_pelvis_l method=hybrid
      FiberForceLengthCurve: strain_at_zero_force=0.1989714 strain_at_one_norm_force=0.7121937
          stiffness_at_low_force=0.2 stiffness_at_one_norm_force=3.896947 curviness=0.75
    Millard2012EquilibriumMuscle glmed1_l: max_isometric_force=1093.467 optimal_fiber_length=0.07148325
        tendon_slack_length=0.0546571 pennation_angle_at_optimal=0.3165559
      PathPoint P1: pelvis (-0.05553236 0.02357957 -0.1079661)
      PathPoint P2: femur_l (-0.01552004 -0.01687397 -0.06540589)
      FiberForceLengthCurve: strain_at_zero_force=-3.729382e-9 strain_at_one_norm_force=0.7 stiffness_at_low_force=0.2
          stiffness_at_one_norm_force=2.857143 curviness=0.75
    Millard2012EquilibriumMuscle glmed2_l: max_isometric_force=765.0917 optimal_fiber_length=0.07918244
        tendon_slack_length=0.07077479 pennation_angle_at_optimal=0.3165559
      PathPoint P1: pelvis (-0.09633164 0.04987986 -0.07698453)
      PathPoint P2: femur_l (-0.02438864 -0.009374427 -0.06208017)
      FiberForceLengthCurve: strain_at_zero_force=0.06397124 strain_at_one_norm_force=0.7014005
          stiffness_at_low_force=0.2 stiffness_at_one_norm_force=3.137603 curviness=0.75
    Millard2012EquilibriumMuscle glmed3_l: max_isometric_force=871.1993 optimal_fiber_length=0.07544368
        tendon_slack_length=0.04674702 pennation_angle_at_optimal=0.3165559
      PathPoint P1: pelvis (-0.1133313 0.0145105 -0.06008549)
      PathPoint P2: femur_l (-0.03425495 -0.004405981 -0.05742415)
      FiberForceLengthCurve: strain_at_zero_force=0.1252157 strain_at_one_norm_force=0.7030514
          stiffness_at_low_force=0.2 stiffness_at_one_norm_force=3.461191 curviness=0.75
    Millard2012EquilibriumMuscle glmin1_l: max_isometric_force=374.0459 optimal_fiber_length=0.07675324
        tendon_slack_length=0.0182151 pennation_angle_at_optimal=0.1745329
      PathPoint P1: pelvis (-0.0339994 0 -0.1107826)
      PathPoint P2: femur_l (0.005542872 -0.01406164 -0.06208017)
      FiberForceLengthCurve: strain_at_zero_force=-3.729382e-9 strain_at_one_norm_force=0.7 stiffness_at_low_force=0.2
          stiffness_at_one_norm_force=2.857143 curviness=0.75
    Millard2012EquilibriumMuscle glmin2_l: max_isometric_force=394.8197 optimal_fiber_length=0.06473212
        tendon_slack_length=0.0301687 pennation_angle_at_optimal=0
      PathPoint P1: pelvis (-0.06981211 0.009069065 -0.09482241)
      PathPoint P2: femur_l (0.004434298 -0.008436985 -0.05764587)
      FiberForceLengthCurve: strain_at_zero_force=0.003039474 strain_at_one_norm_force=0.7000285
          stiffness_at_low_force=0.2 stiffness_at_one_norm_force=2.869486 curviness=0.75
    Millard2012EquilibriumMuscle glmin3_l: max_isometric_force=446.7738 optimal_fiber_length=0.03509573
        tendon_slack_length=0.04698441 pennation_angle_at_optimal=0.01745329
      PathPoint P1: pelvis (-0.08941843 -0.01405705 -0.07491909)
      PathPoint P2: femur_l (-0.004434298 -0.0009374427 -0.05653729)
      FiberForceLengthCurve: strain_at_zero_force=0.007461173 strain_at_one_norm_force=0.7002322
          stiffness_at_low_force=0.2 stiffness_at_one_norm_force=2.886957 curviness=0.75
    Millard2012EquilibriumMuscle grac_l: max_isometric_force=281.3115 optimal_fiber_length=0.2128669
        tendon_slack_length=0.1607377 pennation_angle_at_optimal=0.1720016
      PathPoint P1: pelvis (-0.05367372 -0.1172812 -0.02305781)
      PathPoint P2: tibia_l (-0.01648722 -0.04272369 0.02650307)
      PathPoint P3: tibia_l (0.001593227 -0.0625536 0.01407948)
      PathWrap: wrap_object=GR_at_condyles_l method=hybrid
      FiberForceLengthCurve: strain_at_zero_force=-0.1969779 strain_at_one_norm_force=0.8027483
          stiffness_at_low_force=0.2 stiffness_at_one_norm_force=2.000548 curviness=0.75
    Millard2012EquilibriumMuscle iliacus_l: max_isometric_force=1021.141 optimal_fiber_length=0.10376
        tendon_slack_length=0.0935599 pennation_angle_at_optimal=0.279914
      PathPoint P1: pelvis (-0.06856546 0.02802341 -0.07914385)
      PathPoint P2: pelvis (-0.01529973 -0.05051469 -0.07097598)
      PathPoint P3: femur_l (-0.002549721 -0.05765273 -0.01540918)
      PathPoint P4: femur_l (-0.01352461 -0.0597151 -0.02172806)
      PathWrap: wrap_object=IL_at_brim_l method=hybrid range=(2 3)
      FiberForceLengthCurve: strain_at_zero_force=-0.1703103 strain_at_one_norm_force=0.5005449
          stiffness_at_low_force=0.2 stiffness_at_one_norm_force=2.98127 curviness=0.75
    Millard2012EquilibriumMuscle perbrev_l: max_isometric_force=521.2016 optimal_fiber_length=0.04076284
        tendon_slack_length=0.1324591 pennation_angle_at_optimal=0.2052361
      PathPoint P1: tibia_l (-0.02175024 -0.2275003 -0.0224663)
      PathPoint P2: tibia_l (-0.03034293 -0.3497862 -0.02228728)
      PathPoint P3: tibia_l (-0.02550954 -0.3597596 -0.02282433)
      PathPoint P4: calcn_l (0.0389749 0.027 -0.02085517)
      PathPoint P5: calcn_l (0.05602124 0.0219 -0.03070096)
      FiberForceLengthCurve: strain_at_zero_force=-0.04234068 strain_at_one_norm_force=0.6987541
          stiffness_at_low_force=0.2 stiffness_at_one_norm_force=2.69871 curviness=0.75
    Millard2012EquilibriumMuscle perlong_l: max_isometric_force=1115.371 optimal_fiber_length=0.0453912
        tendon_slack_length=0.2968484 pennation_angle_at_optimal=0.2479525
      PathPoint P1: tibia_l (-0.01790143 -0.1233641 -0.02524102)
      PathPoint P2: tibia_l (-0.02837377 -0.3504152 -0.0212132)
      PathPoint P3: tibia_l (-0.02434595 -0.3606581 -0.02148172)
      PathPoint P4: calcn_l (0.03624417 0.023 -0.01978108)
      PathPoint P5: calcn_l (0.05635224 0.0106 -0.02542003)
      PathPoint P6: calcn_l (0.07050236 0.0069 -0.01056184)
      PathPoint P7: calcn_l (0.09954735 0.0085 0.01646932)
      FiberForceLengthCurve: strain_at_zero_force=-0.1323481 strain_at_one_norm_force=0.6924185
          stiffness_at_low_force=0.2 stiffness_at_one_norm_force=2.424929 curviness=0.75
    Millard2012EquilibriumMuscle piri_l: max_isometric_force=1029.787 optimal_fiber_length=0.02565462
        tendon_slack_length=0.1133798 pennation_angle_at_optimal=0.1745329
      PathPoint P1: pelvis (-0.1153826 -0.0059221 -0.01268367)
      PathPoint P2: pelvis (-0.1156206 -0.02780575 -0.05719387)
      PathPoint P3: femur_l (-0.0164069 -0.003374794 -0.0484447)
      FiberForceLengthCurve: strain_at_zero_force=0.09922992 strain_at_one_norm_force=0.7028348
          stiffness_at_low_force=0.2 stiffness_at_one_norm_force=3.313426 curviness=0.75
    Millard2012EquilibriumMuscle psoas_l: max_isometric_force=1426.79 optimal_fiber_length=0.1126428
        tendon_slack_length=0.09591803 pennation_angle_at_optimal=0.2155251
      PathPoint P1: pelvis (-0.06867879 0.0562282 -0.03661459)
      PathPoint P2: pelvis (-0.02323292 -0.05931169 -0.06158762)
      PathPoint P3: femur_l (-0.01463318 -0.04846579 -0.005099442)
      PathPoint P4: femur_l (-0.0260515 -0.049122 -0.009755455)
      PathWrap: wrap_object=PS_at_brim_l method=hybrid range=(2 3)
      FiberForceLengthCurve: strain_at_zero_force=-0.09543841 strain_at_one_norm_force=0.5010382
          stiffness_at_low_force=0.2 stiffness_at_one_norm_force=3.353023 curviness=0.75
    Millard2012EquilibriumMuscle recfem_l: max_isometric_force=2191.741 optimal_fiber_length=0.07142241
        tendon_slack_length=0.4220354 pennation_angle_at_optimal=0.2170149
      PathPoint P1: pelvis (-0.02719952 -0.03518797 -0.08759337)
      PathPoint P2: patella_l (0.01108574 0.05432015 -0.0007760021)
      PathPoint P3: patella_l (0.01341375 0.0484447 0.001108574)
      PathPoint P4: patella_l (0.005542872 0.002738179 -3.325723e-5)
      PathPoint P5: tibia_l (0.02917933 -0.05671335 0.0004206837)
      PathWrap: wrap_object=KnExt_at_fem_l method=hybrid
      FiberForceLengthCurve: strain_at_zero_force=0.1999726 strain_at_one_norm_force=0.8999622
          stiffness_at_low_force=0.2 stiffness_at_one_norm_force=2.857186 curviness=0.75
    Millard2012EquilibriumMuscle sart_l: max_isometric_force=249.4131 optimal_fiber_length=0.3756305
        tendon_slack_length=0.1155784 pennation_angle_at_optimal=0.02613542
      PathPoint P1: pelvis (-0.02209961 -0.01414774 -0.09914105)
      PathPoint P2: femur_l (-0.003325723 -0.3344796 0.04667098)
      PathPoint P3: tibia_l (-0.0224663 -0.03602987 0.03267011)
      PathPoint P4: tibia_l (-0.01423164 -0.05382017 0.02362989)
      PathPoint P5: tibia_l (0.01217297 -0.07277853 0.002327186)
      FiberForceLengthCurve: strain_at_zero_force=-0.1984568 strain_at_one_norm_force=0.7212821
          stiffness_at_low_force=0.2 stiffness_at_one_norm_force=2.17453 curviness=0.75
    Millard2012EquilibriumMuscle semimem_l: max_isometric_force=2200.987 optimal_fiber_length=0.0646549
        tendon_slack_length=0.3256977 pennation_angle_at_optimal=0.2545615
      PathPoint P1: pelvis (-0.111858 -0.1033873 -0.05764451)
      PathPoint P2: tibia_l (-0.02595708 -0.03746747 0.0175434)
      PathWrap: wrap_object=SM_at_condyles_l method=hybrid
      FiberForceLengthCurve: strain_at_zero_force=0.1994426 strain_at_one_norm_force=0.7353994
          stiffness_at_low_force=0.2 stiffness_at_one_norm_force=3.731644 curviness=0.75
    Millard2012EquilibriumMuscle semiten_l: max_isometric_force=591.2951 optimal_fiber_length=0.180089
        tendon_slack_length=0.2306622 pennation_angle_at_optimal=0.241295
      PathPoint P1: pelvis (-0.1176379 -0.1136354 -0.04835004)
      PathPoint P2: tibia_l (-0.02792623 -0.04564382 0.02049714)
      PathPoint P3: tibia_l (0.001700636 -0.06945408 0.01047234)
      PathWrap: wrap_object=ST_at_condyles_l method=hybrid
      FiberForceLengthCurve: strain_at_zero_force=0.007279189 strain_at_one_norm_force=0.7803276
          stiffness_at_low_force=0.2 stiffness_at_one_norm_force=2.58716 curviness=0.75
    Millard2012EquilibriumMuscle soleus_l: max_isometric_force=6194.843 optimal_fiber_length=0.03962395
        tendon_slack_length=0.2492309 pennation_angle_at_optimal=0.3814289
      PathPoint P1: tibia_l (-0.006802544 -0.08230264 -0.008771702)
      PathPoint P2: calcn_l (0.003640967 0.031 0.004743879)
      FiberForceLengthCurve: strain_at_zero_force=0.1569032 strain_at_one_norm_force=0.8506533
          stiffness_at_low_force=0.2 stiffness_at_one_norm_force=2.882882 curviness=0.75
    Millard2012EquilibriumMuscle tfl_l: max_isometric_force=411.2066 optimal_fiber_length=0.08700773
        tendon_slack_length=0.4116812 pennation_angle_at_optimal=0.05235988
      PathPoint P1: pelvis (-0.02266627 0.009975972 -0.1211098)
      PathPoint P2: femur_l (0.03259209 -0.09327555 -0.06618189)
      PathPoint P3: femur_l (0.01186175 -0.3796643 -0.03591781)
      PathPoint P4: tibia_l (0.009666773 -0.03683852 -0.03096948)
      FiberForceLengthCurve: strain_at_zero_force=0.07118385 strain_at_one_norm_force=0.7197196
          stiffness_at_low_force=0.2 stiffness_at_one_norm_force=3.08387 curviness=0.75
    Millard2012EquilibriumMuscle tibant_l: max_isometric_force=1227.452 optimal_fiber_length=0.06134945
        tendon_slack_length=0.2159905 pennation_angle_at_optimal=0.1951828
      PathPoint P1: tibia_l (0.0137841 -0.1178833 -0.01450016)
      PathPoint P2: tibia_l (0.0224663 -0.1712542 -0.01145692)
      PathPoint P3: tibia_l (0.02085517 -0.3287613 0.01181495)
      PathPoint P4: calcn_l (0.09648563 0.0178 0.02729968)
      FiberForceLengthCurve: strain_at_zero_force=0.1892237 strain_at_one_norm_force=0.7076768
          stiffness_at_low_force=0.2 stiffness_at_one_norm_force=3.85763 curviness=0.75
    Millard2012EquilibriumMuscle tibpost_l: max_isometric_force=1730.154 optimal_fiber_length=0.03390171
        tendon_slack_length=0.251823 pennation_angle_at_optimal=0.2264891
      PathPoint P1: tibia_l (-0.003669794 -0.1171645 -0.009219237)
      PathPoint P2: tibia_l (-0.01467917 -0.3284019 0.01566375)
      PathPoint P3: calcn_l (0.03450644 0.0334 0.02559905)
      PathPoint P4: calcn_l (0.06388242 0.0159 0.02515151)
      FiberForceLengthCurve: strain_at_zero_force=-0.1916705 strain_at_one_norm_force=0.6862359
          stiffness_at_low_force=0.2 stiffness_at_one_norm_force=2.278147 curviness=0.75
    Millard2012EquilibriumMuscle vasint_l: max_isometric_force=1697.361 optimal_fiber_length=0.09464057
        tendon_slack_length=0.1927224 pennation_angle_at_optimal=0.06309973
      PathPoint P1: femur_l (0.03214866 -0.180364 -0.03436581)
      PathPoint P2: femur_l (0.03713724 -0.1953631 -0.03159437)
      PathPoint P3: patella_l (0.006429732 0.05321157 0.0006651446)
      PathPoint P4: patella_l (0.005542872 0.002738179 0.000432344)
      PathPoint P5: tibia_l (0.02915248 -0.05678523 -0.0003848808)
      PathWrap: wrap_object=KnExt_at_fem_l method=hybrid
      FiberForceLengthCurve: strain_at_zero_force=0.1999153 strain_at_one_norm_force=0.8514363
          stiffness_at_low_force=0.2 stiffness_at_one_norm_force=3.06974 curviness=0.75
    Millard2012EquilibriumMuscle vaslat_l: max_isometric_force=5148.767 optimal_fiber_length=0.09550162
        tendon_slack_length=0.2119495 pennation_angle_at_optimal=0.2528673
      PathPoint P1: femur_l (0.005321157 -0.1738019 -0.03868925)
      PathPoint P2: femur_l (0.02982065 -0.2428914 -0.04534069)
      PathPoint P3: patella_l (0.01141832 0.0468927 -0.0156309)
      PathPoint P4: patella_l (0.005542872 0.002738179 -0.00812585)
      PathPoint P5: tibia_l (0.02912563 -0.05694696 -0.004573816)
      PathWrap: wrap_object=KnExt_at_fem_l method=hybrid
      FiberForceLengthCurve: strain_at_zero_force=0.1999632 strain_at_one_norm_force=0.8928189
          stiffness_at_low_force=0.2 stiffness_at_one_norm_force=2.886604 curviness=0.75
    Millard2012EquilibriumMuscle vasmed_l: max_isometric_force=2747.823 optimal_fiber_length=0.09295178
        tendon_slack_length=0.1919572 pennation_angle_at_optimal=0.4222225
      PathPoint P1: femur_l (0.01552004 -0.1967692 -0.0208412)
      PathPoint P2: femur_l (0.03946525 -0.2595779 -0.000997717)
      PathPoint P3: patella_l (0.006984019 0.04933156 0.01884576)
      PathPoint P4: patella_l (0.005542872 0.002738179 0.009422882)
      PathPoint P5: tibia_l (0.02855278 -0.05711767 0.006068585)
      PathWrap: wrap_object=KnExt_at_fem_l method=hybrid
      FiberForceLengthCurve: strain_at_zero_force=0.1999354 strain_at_one_norm_force=0.8518332
          stiffness_at_low_force=0.2 stiffness_at_one_norm_force=3.067965 curviness=0.75
    CoordinateActuator lumbar_ext: coordinate=lumbar_extension optimal_force=10
    CoordinateActuator lumbar_bend: coordinate=lumbar_bending optimal_force=10
    CoordinateActuator lumbar_rot: coordinate=lumbar_rotation optimal_force=10
    CoordinateActuator shoulder_flex_r: coordinate=arm_flex_r optimal_force=10
    CoordinateActuator shoulder_add_r: coordinate=arm_add_r optimal_force=10
    CoordinateActuator shoulder_rot_r: coordinate=arm_rot_r optimal_force=10
    CoordinateActuator elbow_flex_r: coordinate=elbow_flex_r optimal_force=10
    CoordinateActuator pro_sup_r: coordinate=pro_sup_r optimal_force=10
    CoordinateActuator wrist_flex_r: coordinate=wrist_flex_r optimal_force=10
    CoordinateActuator wrist_dev_r: coordinate=wrist_dev_r optimal_force=10
    CoordinateActuator shoulder_flex_l: coordinate=arm_flex_l optimal_force=10
    CoordinateActuator shoulder_add_l: coordinate=arm_add_l optimal_force=10
    CoordinateActuator shoulder_rot_l: coordinate=arm_rot_l optimal_force=10
    CoordinateActuator elbow_flex_l: coordinate=elbow_flex_l optimal_force=10
    CoordinateActuator pro_sup_l: coordinate=pro_sup_l optimal_force=10
    CoordinateActuator wrist_flex_l: coordinate=wrist_flex_l optimal_force=10
    CoordinateActuator wrist_dev_l: coordinate=wrist_dev_l optimal_force=10
    ObjectGroup right_leg: members=(addbrev_r addlong_r addmagDist_r addmagIsch_r addmagMid_r addmagProx_r bflh_r bfsh_r edl_r ehl_r fdl_r fhl_r gaslat_r gasmed_r glmax1_r glmax2_r glmax3_r glmed1_r glmed2_r glmed3_r glmin1_r glmin2_r glmin3_r grac_r iliacus_r perbrev_r perlong_r piri_r psoas_r recfem_r sart_r semimem_r semiten_r soleus_r tfl_r tibant_r tibpost_r vasint_r vaslat_r vasmed_r)
    ObjectGroup left_leg: members=(addbrev_l addlong_l addmagDist_l addmagIsch_l addmagMid_l addmagProx_l bflh_l bfsh_l edl_l ehl_l fdl_l fhl_l gaslat_l gasmed_l glmax1_l glmax2_l glmax3_l glmed1_l glmed2_l glmed3_l glmin1_l glmin2_l glmin3_l grac_l iliacus_l perbrev_l perlong_l piri_l psoas_l recfem_l sart_l semimem_l semiten_l soleus_l tfl_l tibant_l tibpost_l vasint_l vaslat_l vasmed_l)
    ObjectGroup hip_add_r: members=(addbrev_r addlong_r addmagDist_r addmagIsch_r addmagMid_r addmagProx_r bflh_r grac_r semimem_r semiten_r)
    ObjectGroup hip_abd_r: members=(glmax1_r glmed1_r glmed2_r glmed3_r glmin1_r glmin2_r glmin3_r piri_r sart_r tfl_r)
    ObjectGroup hip_flex_r: members=(addbrev_r addlong_r glmin1_r grac_r iliacus_r psoas_r recfem_r sart_r tfl_r)
    ObjectGroup hip_ext_r: members=(addlong_r addmagDist_r addmagIsch_r addmagMid_r addmagProx_r bflh_r glmax1_r glmax2_r glmax3_r glmed1_r glmed2_r glmed3_r glmin3_r semimem_r semiten_r)
    ObjectGroup hip_inrot_r: members=(glmed1_r glmed2_r glmed3_r glmin1_r iliacus_r psoas_r tfl_r)
    ObjectGroup hip_exrot_r: members=(glmin3_r piri_r)
    ObjectGroup knee_flex_r: members=(bflh_r bfsh_r gaslat_r gasmed_r grac_r sart_r semimem_r semiten_r)
    ObjectGroup knee_ext_r: members=(recfem_r vasint_r vaslat_r vasmed_r)
    ObjectGroup ankle_df_r: members=(edl_r ehl_r tibant_r)
    ObjectGroup ankle_pf_r: members=(fdl_r fhl_r gaslat_r gasmed_r perbrev_r perlong_r soleus_r tibpost_r)
    ObjectGroup everter_r: members=(edl_r perbrev_r perlong_r)
    ObjectGroup inverter_r: members=(ehl_r fdl_r fhl_r tibant_r tibpost_r)
    ObjectGroup hip_add_l: members=(addbrev_l addlong_l addmagDist_l addmagIsch_l addmagMid_l addmagProx_l bflh_l grac_l semimem_l semiten_l)
    ObjectGroup hip_abd_l: members=(glmax1_l glmed1_l glmed2_l glmed3_l glmin1_l glmin2_l glmin3_l piri_l sart_l tfl_l)
    ObjectGroup hip_flex_l: members=(addbrev_l addlong_l glmin1_l grac_l iliacus_l psoas_l recfem_l sart_l tfl_l)
    ObjectGroup hip_ext_l: members=(addlong_l addmagDist_l addmagIsch_l addmagMid_l addmagProx_l bflh_l glmax1_l glmax2_l glmax3_l glmed1_l glmed2_l glmed3_l glmin3_l semimem_l semiten_l)
    ObjectGroup hip_exrot_l: members=(glmin3_l piri_l)
    ObjectGroup hip_inrot_l: members=(glmed1_l glmed2_l glmed3_l glmin1_l iliacus_l psoas_l tfl_l)
    ObjectGroup knee_flex_l: members=(bflh_l bfsh_l gaslat_l gasmed_l grac_l sart_l semimem_l semiten_l)
    ObjectGroup knee_ext_l: members=(recfem_l vasint_l vaslat_l vasmed_l)
    ObjectGroup ankle_df_l: members=(edl_l ehl_l tibant_l)
    ObjectGroup ankle_pf_l: members=(fdl_l fhl_l gaslat_l gasmed_l perbrev_l perlong_l soleus_l tibpost_l)
    ObjectGroup everter_l: members=(edl_l perbrev_l perlong_l)
    ObjectGroup inverter_l: members=(ehl_l fdl_l fhl_l tibant_l tibpost_l)
  MarkerSet:
    Marker C7: torso (-0.09037749 0.3683412 0.003333636) fixed=true
    Marker R_Shoulder: torso (0 0.3665872 0.1577921) fixed=true
    Marker L_Shoulder: torso (0 0.3665872 -0.1577921) fixed=true
    Marker Sternum: torso (0.05196706 0.3376461 0) fixed=true
    Marker r.ASIS: pelvis (0.01473307 0.009069065 0.120171) fixed=true
    Marker L.ASIS: pelvis (0.01473307 0.009069065 -0.120171) fixed=true
    Marker r.PSIS: pelvis (-0.1745303 0.02267266 0.04694179) fixed=true
    Marker L.PSIS: pelvis (-0.1745303 0.02267266 -0.04694179) fixed=true
    Marker R_HJC: femur_r (0 0 0) fixed=true
    Marker L_HJC: femur_l (0 0 0) fixed=true
    Marker r_thigh1: femur_r (0.06483716 -0.08748425 0.09416917)
    Marker r_thigh2: femur_r (0.05166066 -0.1959878 0.09487902)
    Marker r_thigh3: femur_r (-0.001883289 -0.2268133 0.1004592)
    Marker r_thigh4: femur_r (-0.04994692 -0.07869067 0.0932769)
    Marker r_thigh5: femur_r (-0.05645102 -0.1946282 0.07735287)
    Marker r_knee: femur_r (0 -0.3792628 0.06254056) fixed=true
    Marker r_mknee: femur_r (0.005685505 -0.3764465 -0.06254056) fixed=true
    Marker r_shank_antsup: tibia_r (0.0153334 -0.08735994 0.07215654)
    Marker r_sh2: tibia_r (0.02396595 -0.1990758 0.0681443)
    Marker r_sh3: tibia_r (-0.05823792 -0.09407252 0.08762323)
    Marker r_sh4: tibia_r (-0.05775742 -0.2088139 0.07106018)
    Marker r_ankle: tibia_r (-0.01758313 -0.3538873 0.04659529) fixed=true
    Marker r_mankle: tibia_r (0.005274938 -0.3492913 -0.03340794) fixed=true
    Marker r_toe: calcn_r (0.164024 0.018 0.004395782) fixed=true
    Marker r_5meta: calcn_r (0.1208598 0.005 0.05714517) fixed=true
    Marker r_calc: calcn_r (-0.02589853 0.012 -0.008791564) fixed=true
    Marker L_thigh1: femur_l (0.07317293 -0.1376411 -0.09084169)
    Marker L_thigh2: femur_l (0.05841794 -0.2761573 -0.0541182)
    Marker L_thigh3: femur_l (-0.03742817 -0.1286637 -0.1042223)
    Marker L_thigh4: femur_l (-0.05727627 -0.2611512 -0.07054948)
    Marker L_knee: femur_l (0 -0.3787269 -0.06097159) fixed=true
    Marker L_mknee: femur_l (0.005542872 -0.3759145 0.06097159) fixed=true
    Marker L_ankle: tibia_l (-0.01790143 -0.3459227 -0.04743879) fixed=true
    Marker L_shank_antsup: tibia_l (-0.00205504 -0.07041159 -0.06386112)
    Marker L_sh2: tibia_l (-0.09231456 -0.06974837 -0.06680648)
    Marker L_sh3: tibia_l (-0.08181405 -0.1912182 -0.05996131)
    Marker L_mankle: tibia_l (0.00537043 -0.3414302 0.03401272) fixed=true
    Marker L_toe: calcn_l (0.1572236 0.018 -0.004475358) fixed=true
    Marker L_calc: calcn_l (-0.02482478 0.025 0.008950716) fixed=true
    Marker L_5meta: calcn_l (0.115849 0.005 -0.05817965) fixed=true
    Marker midASIS: pelvis (0.01473307 0.009069065 0) fixed=true
    Marker R_5meta_proj: calcn_r (0.1483583 -0.05843977 0.07390413)
    Marker L_5meta_proj: calcn_l (0.151422 -0.05785625 -0.0673372)
    Marker R_toe_proj: calcn_r (0.1773416 -0.06231756 0.004571327)
    Marker L_toe_proj: calcn_l (0.1730281 -0.05824462 -0.005849242)
    Marker L_AJC: talus_l (0 0 0) fixed=true
    Marker L_AJC_proj: talus_l (0.01356031 -0.1102487 0.009995404)
    Marker L_KJC: femur_l (0.002771436 -0.3773207 0) fixed=true
    Marker R_AJC: talus_r (0 0 0) fixed=true
    Marker R_AJC_proj: talus_r (0.01068969 -0.1140632 -0.007531739)
    Marker R_KJC: femur_r (0.002842753 -0.3778547 0) fixed=true
    Marker midHJC: pelvis (-0.06377835 -0.07118309 0) fixed=true
    Marker midPelvis: pelvis (-0.07989859 0.01587086 0) fixed=true
    Marker midPSIS: pelvis (-0.1745303 0.02267266 0) fixed=true
    Marker r_band: calcn_r (0.1266447 0.03877247 -0.05520017)
    Marker L_band: calcn_l (0.1098367 0.04817288 0.05706519)
    Marker R_elbow_med: humerus_r (0.005048382 -0.2898026 -0.0425901) fixed=true
    Marker R_elbow_lat: humerus_r (0.01093773 -0.2883927 0.03459896) fixed=true
    Marker L_elbow_med: humerus_l (0.005804188 -0.2942686 0.04289252) fixed=true
    Marker L_elbow_lat: humerus_l (0.01632947 -0.2895869 -0.03389635) fixed=true
    Marker L_wrist_radius: radius_l (-0.02733669 -0.21621 -0.03567273) fixed=true
    Marker L_wrist_ulna: ulna_l (-0.03411255 -0.2315343 -0.02268107) fixed=true
    Marker R_wrist_radius: radius_r (-0.02098493 -0.2123173 0.03321256) fixed=true
    Marker R_wrist_ulna: ulna_r (-0.03410367 -0.2254354 0.02695924) fixed=true
    Marker R_forearm: radius_r (-0.007003213 -0.1432986 0.03367316)
    Marker L_forearm: radius_l (-0.002488246 -0.1641979 -0.03473806)
    Marker R_humerus: humerus_r (0.03150318 -0.1633213 0.008911737)
    Marker L_humerus: humerus_l (0.02395003 -0.1552198 -0.01888975)
  ProbeSet:
    Umberger2010MuscleMetabolicsProbe metabolic_power: probe_operation=value activation_maintenance_rate_on=true
        shortening_rate_on=true basal_rate_on=true mechanical_work_rate_on=true muscle_effort_scaling_factor=1
        report_total_metabolics_only=false
      Umberger2010MuscleMetabolicsProbe_MetabolicMuscleParameterSet:
        Umberger2010MuscleMetabolicsProbe_MetabolicMuscleParameter [values shared by the 80 below unless stated]: specific_tension=600000 [N/m^2]
            use_provided_muscle_mass=false
        Umberger2010MuscleMetabolicsProbe_MetabolicMuscleParameter addbrev_r: ratio_slow_twitch_fibers=0.5
        Umberger2010MuscleMetabolicsProbe_MetabolicMuscleParameter addlong_r: ratio_slow_twitch_fibers=0.5
        Umberger2010MuscleMetabolicsProbe_MetabolicMuscleParameter addmagDist_r: ratio_slow_twitch_fibers=0.552
        Umberger2010MuscleMetabolicsProbe_MetabolicMuscleParameter addmagIsch_r: ratio_slow_twitch_fibers=0.552
        Umberger2010MuscleMetabolicsProbe_MetabolicMuscleParameter addmagMid_r: ratio_slow_twitch_fibers=0.552
        Umberger2010MuscleMetabolicsProbe_MetabolicMuscleParameter addmagProx_r: ratio_slow_twitch_fibers=0.552
        Umberger2010MuscleMetabolicsProbe_MetabolicMuscleParameter bflh_r: ratio_slow_twitch_fibers=0.5425
        Umberger2010MuscleMetabolicsProbe_MetabolicMuscleParameter bfsh_r: ratio_slow_twitch_fibers=0.529
        Umberger2010MuscleMetabolicsProbe_MetabolicMuscleParameter edl_r: ratio_slow_twitch_fibers=0.75
        Umberger2010MuscleMetabolicsProbe_MetabolicMuscleParameter ehl_r: ratio_slow_twitch_fibers=0.75
        Umberger2010MuscleMetabolicsProbe_MetabolicMuscleParameter fdl_r: ratio_slow_twitch_fibers=0.6
        Umberger2010MuscleMetabolicsProbe_MetabolicMuscleParameter fhl_r: ratio_slow_twitch_fibers=0.6
        Umberger2010MuscleMetabolicsProbe_MetabolicMuscleParameter gaslat_r: ratio_slow_twitch_fibers=0.507
        Umberger2010MuscleMetabolicsProbe_MetabolicMuscleParameter gasmed_r: ratio_slow_twitch_fibers=0.566
        Umberger2010MuscleMetabolicsProbe_MetabolicMuscleParameter glmax1_r: ratio_slow_twitch_fibers=0.55
        Umberger2010MuscleMetabolicsProbe_MetabolicMuscleParameter glmax2_r: ratio_slow_twitch_fibers=0.55
        Umberger2010MuscleMetabolicsProbe_MetabolicMuscleParameter glmax3_r: ratio_slow_twitch_fibers=0.55
        Umberger2010MuscleMetabolicsProbe_MetabolicMuscleParameter glmed1_r: ratio_slow_twitch_fibers=0.55
        Umberger2010MuscleMetabolicsProbe_MetabolicMuscleParameter glmed2_r: ratio_slow_twitch_fibers=0.55
        Umberger2010MuscleMetabolicsProbe_MetabolicMuscleParameter glmed3_r: ratio_slow_twitch_fibers=0.55
        Umberger2010MuscleMetabolicsProbe_MetabolicMuscleParameter glmin1_r: ratio_slow_twitch_fibers=0.55
        Umberger2010MuscleMetabolicsProbe_MetabolicMuscleParameter glmin2_r: ratio_slow_twitch_fibers=0.55
        Umberger2010MuscleMetabolicsProbe_MetabolicMuscleParameter glmin3_r: ratio_slow_twitch_fibers=0.55
        Umberger2010MuscleMetabolicsProbe_MetabolicMuscleParameter grac_r: ratio_slow_twitch_fibers=0.5
        Umberger2010MuscleMetabolicsProbe_MetabolicMuscleParameter iliacus_r: ratio_slow_twitch_fibers=0.5
        Umberger2010MuscleMetabolicsProbe_MetabolicMuscleParameter perbrev_r: ratio_slow_twitch_fibers=0.6
        Umberger2010MuscleMetabolicsProbe_MetabolicMuscleParameter perlong_r: ratio_slow_twitch_fibers=0.6
        Umberger2010MuscleMetabolicsProbe_MetabolicMuscleParameter piri_r: ratio_slow_twitch_fibers=0.5
        Umberger2010MuscleMetabolicsProbe_MetabolicMuscleParameter psoas_r: ratio_slow_twitch_fibers=0.5
        Umberger2010MuscleMetabolicsProbe_MetabolicMuscleParameter recfem_r: ratio_slow_twitch_fibers=0.3865
        Umberger2010MuscleMetabolicsProbe_MetabolicMuscleParameter sart_r: ratio_slow_twitch_fibers=0.5
        Umberger2010MuscleMetabolicsProbe_MetabolicMuscleParameter semimem_r: ratio_slow_twitch_fibers=0.4925
        Umberger2010MuscleMetabolicsProbe_MetabolicMuscleParameter semiten_r: ratio_slow_twitch_fibers=0.425
        Umberger2010MuscleMetabolicsProbe_MetabolicMuscleParameter soleus_r: ratio_slow_twitch_fibers=0.803
        Umberger2010MuscleMetabolicsProbe_MetabolicMuscleParameter tfl_r: ratio_slow_twitch_fibers=0.5
        Umberger2010MuscleMetabolicsProbe_MetabolicMuscleParameter tibant_r: ratio_slow_twitch_fibers=0.7
        Umberger2010MuscleMetabolicsProbe_MetabolicMuscleParameter tibpost_r: ratio_slow_twitch_fibers=0.6
        Umberger2010MuscleMetabolicsProbe_MetabolicMuscleParameter vasint_r: ratio_slow_twitch_fibers=0.543
        Umberger2010MuscleMetabolicsProbe_MetabolicMuscleParameter vaslat_r: ratio_slow_twitch_fibers=0.455
        Umberger2010MuscleMetabolicsProbe_MetabolicMuscleParameter vasmed_r: ratio_slow_twitch_fibers=0.503
        Umberger2010MuscleMetabolicsProbe_MetabolicMuscleParameter addbrev_l: ratio_slow_twitch_fibers=0.5
        Umberger2010MuscleMetabolicsProbe_MetabolicMuscleParameter addlong_l: ratio_slow_twitch_fibers=0.5
        Umberger2010MuscleMetabolicsProbe_MetabolicMuscleParameter addmagDist_l: ratio_slow_twitch_fibers=0.552
        Umberger2010MuscleMetabolicsProbe_MetabolicMuscleParameter addmagIsch_l: ratio_slow_twitch_fibers=0.552
        Umberger2010MuscleMetabolicsProbe_MetabolicMuscleParameter addmagMid_l: ratio_slow_twitch_fibers=0.552
        Umberger2010MuscleMetabolicsProbe_MetabolicMuscleParameter addmagProx_l: ratio_slow_twitch_fibers=0.552
        Umberger2010MuscleMetabolicsProbe_MetabolicMuscleParameter bflh_l: ratio_slow_twitch_fibers=0.5425
        Umberger2010MuscleMetabolicsProbe_MetabolicMuscleParameter bfsh_l: ratio_slow_twitch_fibers=0.529
        Umberger2010MuscleMetabolicsProbe_MetabolicMuscleParameter edl_l: ratio_slow_twitch_fibers=0.75
        Umberger2010MuscleMetabolicsProbe_MetabolicMuscleParameter ehl_l: ratio_slow_twitch_fibers=0.75
        Umberger2010MuscleMetabolicsProbe_MetabolicMuscleParameter fdl_l: ratio_slow_twitch_fibers=0.6
        Umberger2010MuscleMetabolicsProbe_MetabolicMuscleParameter fhl_l: ratio_slow_twitch_fibers=0.6
        Umberger2010MuscleMetabolicsProbe_MetabolicMuscleParameter gaslat_l: ratio_slow_twitch_fibers=0.507
        Umberger2010MuscleMetabolicsProbe_MetabolicMuscleParameter gasmed_l: ratio_slow_twitch_fibers=0.566
        Umberger2010MuscleMetabolicsProbe_MetabolicMuscleParameter glmax1_l: ratio_slow_twitch_fibers=0.55
        Umberger2010MuscleMetabolicsProbe_MetabolicMuscleParameter glmax2_l: ratio_slow_twitch_fibers=0.55
        Umberger2010MuscleMetabolicsProbe_MetabolicMuscleParameter glmax3_l: ratio_slow_twitch_fibers=0.55
        Umberger2010MuscleMetabolicsProbe_MetabolicMuscleParameter glmed1_l: ratio_slow_twitch_fibers=0.55
        Umberger2010MuscleMetabolicsProbe_MetabolicMuscleParameter glmed2_l: ratio_slow_twitch_fibers=0.55
        Umberger2010MuscleMetabolicsProbe_MetabolicMuscleParameter glmed3_l: ratio_slow_twitch_fibers=0.55
        Umberger2010MuscleMetabolicsProbe_MetabolicMuscleParameter glmin1_l: ratio_slow_twitch_fibers=0.55
        Umberger2010MuscleMetabolicsProbe_MetabolicMuscleParameter glmin2_l: ratio_slow_twitch_fibers=0.55
        Umberger2010MuscleMetabolicsProbe_MetabolicMuscleParameter glmin3_l: ratio_slow_twitch_fibers=0.55
        Umberger2010MuscleMetabolicsProbe_MetabolicMuscleParameter grac_l: ratio_slow_twitch_fibers=0.5
        Umberger2010MuscleMetabolicsProbe_MetabolicMuscleParameter iliacus_l: ratio_slow_twitch_fibers=0.5
        Umberger2010MuscleMetabolicsProbe_MetabolicMuscleParameter perbrev_l: ratio_slow_twitch_fibers=0.6
        Umberger2010MuscleMetabolicsProbe_MetabolicMuscleParameter perlong_l: ratio_slow_twitch_fibers=0.6
        Umberger2010MuscleMetabolicsProbe_MetabolicMuscleParameter piri_l: ratio_slow_twitch_fibers=0.5
        Umberger2010MuscleMetabolicsProbe_MetabolicMuscleParameter psoas_l: ratio_slow_twitch_fibers=0.5
        Umberger2010MuscleMetabolicsProbe_MetabolicMuscleParameter recfem_l: ratio_slow_twitch_fibers=0.3865
        Umberger2010MuscleMetabolicsProbe_MetabolicMuscleParameter sart_l: ratio_slow_twitch_fibers=0.5
        Umberger2010MuscleMetabolicsProbe_MetabolicMuscleParameter semimem_l: ratio_slow_twitch_fibers=0.4925
        Umberger2010MuscleMetabolicsProbe_MetabolicMuscleParameter semiten_l: ratio_slow_twitch_fibers=0.425
        Umberger2010MuscleMetabolicsProbe_MetabolicMuscleParameter soleus_l: ratio_slow_twitch_fibers=0.803
        Umberger2010MuscleMetabolicsProbe_MetabolicMuscleParameter tfl_l: ratio_slow_twitch_fibers=0.5
        Umberger2010MuscleMetabolicsProbe_MetabolicMuscleParameter tibant_l: ratio_slow_twitch_fibers=0.7
        Umberger2010MuscleMetabolicsProbe_MetabolicMuscleParameter tibpost_l: ratio_slow_twitch_fibers=0.6
        Umberger2010MuscleMetabolicsProbe_MetabolicMuscleParameter vasint_l: ratio_slow_twitch_fibers=0.543
        Umberger2010MuscleMetabolicsProbe_MetabolicMuscleParameter vaslat_l: ratio_slow_twitch_fibers=0.455
        Umberger2010MuscleMetabolicsProbe_MetabolicMuscleParameter vasmed_l: ratio_slow_twitch_fibers=0.503
